Simulations: Version=173
  Folder Replacements
    Plant Soybean: PlantType=Soybean
      OrganArbitrator Arbitrator
        BiomassTypeArbitrator DMArbitration
          Folder PotentialPartitioningMethods
            ReallocationMethod
            AllocateFixationMethod
            RetranslocationMethod
            SendPotentialDMAllocationsMethod
          Folder AllocationMethods
            NutrientConstrainedAllocationMethod
            DryMatterAllocationsMethod
          RelativeAllocation ArbitrationMethod
        BiomassTypeArbitrator NArbitration
          Folder PotentialPartitioningMethods
            ReallocationMethod
          Folder ActualPartitioningMethods
            AllocateFixationMethod
            RetranslocationMethod
          Folder AllocationMethods
            NitrogenAllocationsMethod
          RelativeAllocation ArbitrationMethod
          AllocateUptakesMethod
        WaterUptakeMethod
        NitrogenUptakeMethod
      Phenology
        Memo Introduction
          In the new model we simplified phenology by taking out stages that are not measurable (e.g. end of juvenile stage) and by adding new stages that are measurable (e.g. start pod).
          The new phenology follows the V/R staging system.

          ![Alt Text](Diagrams_soy_phenology_comparison.png)

          **Figure [FigureNumber]:** Comparison of soybean phenological stages for APSIM Classic and APSIM Next Generation.
        Memo
          The key differences for cultivars are mostly phenological parameters (e.g., Vegetative.Target, ReproductivePhotoperiodModifier). In some cases, some additional parameters have been changed, see parameter values in the cultivar section.
        SubDailyInterpolation VegetativeThermalTime: agregationMethod=0
          XYPairs Response: X=[10, 20, 30, 40]; Y=[0, 10, 20, 0]
          ThreeHourAirTemperature InterpolationMethod
        LinearInterpolationFunction VegetativePhotoperiodModifier
          XYPairs: X=[12.58, 21.19]; Y=[1, 0]
          Memo
            These parameters are overridden by cultivar parameter descriptions to capture the difference between individual cultivars in terms of their phenological development.  Responses shown here are only indicative.  See cultivar descriptions for more information.
          VariableReference XValue: VariableName=[Phenology].Photoperiod
        SubDailyInterpolation ReproductiveThermalTime: agregationMethod=0
          XYPairs Response: X=[10, 15, 30, 40]; Y=[5, 5, 20, 0]
          ThreeHourAirTemperature InterpolationMethod
          Memo
            Cardinal temperatures for vegetative and reproductive thermal time are the same except the range of 0-15° C. A base temperature of 10° C is used for vegetative phase, which temperature has been used to calibrate 56 soybean cultivars in the USA ([ARCHONTOULIS2014465]) and 72 soybean cultivars in China ([WU2019125940]). The small changes in cardinal temperatures for reproductive thermal time was important for solving issues related to photoperiod response for some Australian cultivars. Such a differentiation in base temperature between V and R stages is supported by [BootChapter1998], DSSAT-CROPGRO soybean model, who showed that cardinal temperatures may differ for vegetative and reproductive development for soybean. This is something to further explore as new data from other environments are added to the APSIM NG database.
        LinearInterpolationFunction ReproductivePhotoperiodModifier: same as Replacements.Soybean.Phenology.VegetativePhotoperiodModifier
        PhaseLookup ThermalTime
          PhaseLookupValue PreEmergence: Start=Sowing; End=Emergence
            VariableReference Base: VariableName=[Phenology].VegetativeThermalTime
          PhaseLookupValue VegetativeGrowth: Start=Emergence; End=EndCanopyDevelopment
            MultiplyFunction TT
              VariableReference Base: VariableName=[Phenology].VegetativeThermalTime
              VariableReference PPModifier: VariableName=[Phenology].VegetativePhotoperiodModifier
          PhaseLookupValue ReproductiveGrowth: Start=EndCanopyDevelopment; End=HarvestRipe
            MultiplyFunction TT
              VariableReference Base: VariableName=[Phenology].ReproductiveThermalTime
              VariableReference PPModifier: VariableName=[Phenology].ReproductivePhotoperiodModifier
        PhotoperiodFunction Photoperiod: Twilight=0; DayLength=0
        GerminatingPhase Germinating: Start=Sowing; End=Germination; IsEmerged=false
          Constant MinSoilTemperature: FixedValue=0
        EmergingPhase Emerging: Start=Germination; End=Emergence; IsEmerged=true; TTForTimeStep=0
          VariableReference ThermalTime: VariableName=[Phenology].VegetativeThermalTime
          AddFunction Target
            Constant ShootLag: FixedValue=10
            MultiplyFunction DepthxRate
              VariableReference SowingDepth: VariableName=[Plant].SowingData.Depth
              Constant ShootRate: FixedValue=1
        GenericPhase Vegetative: Start=Emergence; End=StartFlowering; IsEmerged=true
          Constant Target: FixedValue=200
          VariableReference Progression: VariableName=[Phenology].ThermalTime
        GenericPhase EarlyFlowering: Start=StartFlowering; End=StartPodDevelopment; IsEmerged=true
          Memo
            The duration of the grain filling phase has been taken from the model of Robertson et al (2002).
          Constant Target: FixedValue=200
          VariableReference Progression: VariableName=[Phenology].ThermalTime
        GenericPhase EarlyPodDevelopment: Start=StartPodDevelopment; End=StartGrainFilling; IsEmerged=true
          Memo
            The duration of the grain filling phase has been taken from the model of Robertson et al (2002).
          Constant Target: FixedValue=140
          VariableReference Progression: VariableName=[Phenology].ThermalTime
        GenericPhase EarlyGrainFilling: Start=StartGrainFilling; End=EndCanopyDevelopment; IsEmerged=true
          MultiplyFunction Target
            Constant FractionofGrainfilling: FixedValue=0.05
            VariableReference EntireGrainfilling
              VariableName=[Phenology].LateGrainFilling.Target.EntireGrainfillPeriod.FixedValue
          VariableReference Progression: VariableName=[Phenology].ThermalTime
        GenericPhase MidGrainFilling: Start=EndCanopyDevelopment; End=EndPodDevelopment; IsEmerged=true
          MultiplyFunction Target
            Constant FractionofMidToLateGrainfilling: FixedValue=0.5
            SubtractFunction MidToLateGrainfilling
              VariableReference EntireGrainfilling
                VariableName=[Phenology].LateGrainFilling.Target.EntireGrainfillPeriod.FixedValue
              VariableReference EarlyGrainfilling: VariableName=[Phenology].EarlyGrainFilling.Target
          VariableReference Progression: VariableName=[Phenology].ThermalTime
          Constant FractionofMidToLateGrainfilling: FixedValue=0.5
        GenericPhase LateGrainFilling: Start=EndPodDevelopment; End=EndGrainFill; IsEmerged=true
          SubtractFunction Target
            Constant EntireGrainfillPeriod: FixedValue=500
            VariableReference EarlyGrainFillingTarget: VariableName=[Phenology].EarlyGrainFilling.Target
            VariableReference MidGrainFillingTarget: VariableName=[Phenology].MidGrainFilling.Target
          VariableReference Progression: VariableName=[Phenology].ThermalTime
        GenericPhase Maturing: Start=EndGrainFill; End=Maturity; IsEmerged=true
          Constant Target: FixedValue=45
          VariableReference Progression: VariableName=[Phenology].ThermalTime
        GenericPhase Ripening: Start=Maturity; End=HarvestRipe; IsEmerged=true
          Constant Target: FixedValue=45
          VariableReference Progression: VariableName=[Phenology].ThermalTime
        EndPhase ReadyForHarvesting: Start=HarvestRipe; End=Unused; IsEmerged=true
          VariableReference ThermalTime: VariableName=[Phenology].ThermalTime
        OnEventFunction EmergenceDAS: SetEvent=Emergence; ReSetEvent=never
          Memo
            A function is used to provide emergence date as days after sowing(DAS).
          Constant PreEventValue: FixedValue=0
          VariableReference PostEventValue: VariableName=[Plant].DaysAfterSowing
        OnEventFunction FloweringDAS: SetEvent=StartFlowering; ReSetEvent=never
          Memo
            A function is used to provide flowering date as days after sowing(DAS).
          Constant PreEventValue: FixedValue=0
          VariableReference PostEventValue: VariableName=[Plant].DaysAfterSowing
        OnEventFunction StartPodDevelopmentDAS: SetEvent=StartPodDevelopment; ReSetEvent=never
          Memo
            A function is used to provide emergence date as days after sowing(DAS).
          Constant PreEventValue: FixedValue=0
          VariableReference PostEventValue: VariableName=[Plant].DaysAfterSowing
        OnEventFunction StartGrainFillingDAS: SetEvent=StartGrainFilling; ReSetEvent=never
          Memo
            A function is used to provide emergence date as days after sowing(DAS).
          Constant PreEventValue: FixedValue=0
          VariableReference PostEventValue: VariableName=[Plant].DaysAfterSowing
        OnEventFunction EndGrainFillDAS: SetEvent=EndGrainFill; ReSetEvent=never
          Memo
            A function is used to provide emergence date as days after sowing(DAS).
          Constant PreEventValue: FixedValue=0
          VariableReference PostEventValue: VariableName=[Plant].DaysAfterSowing
        OnEventFunction MaturityDAS: SetEvent=Maturity; ReSetEvent=never
          Memo
            A function is used to provide maturity date as days after sowing(DAS).
          Constant PreEventValue: FixedValue=0
          VariableReference PostEventValue: VariableName=[Plant].DaysAfterSowing
        OnEventFunction HarvestRipeDAS: SetEvent=HarvestRipe; ReSetEvent=never
          Memo
            A function is used to provide maturity date as days after sowing(DAS).
          Constant PreEventValue: FixedValue=0
          VariableReference PostEventValue: VariableName=[Plant].DaysAfterSowing
      SimpleLeaf Leaf: Albedo=0.25; Gsmax350=0.015; R50=150; LeafInitialisationStage=Emergence; Height=0; BaseHeight=0; Width=0; FRGR=0; PotentialEP=0; WaterDemand=0; KDead=0.2; LAIDead=0
        RUEModel Photosynthesis
          Constant RUE: FixedValue=1.2
            Memo
              This value has been fitted to available data. In contrast to Classic, the RUE value in NG refers to the whole plant (above and below ground) and the calibrated value is 1.2 g/MJ. There are no literature references for whole plant RUE in soybean. To come up with this value we considered: RUE for above ground biomass ([SINCLAIR198929]; [VANROEKEL20141189]), biomass and root data from Iowa FACTS experiments and model fitting to available data.
          WeightedTemperatureFunction FT: MaximumTemperatureWeighting=0.5
            XYPairs: X=[10, 20, 30, 40]; Y=[0, 1, 1, 0]
            Memo
              The function for temperature effect on RUE comes from APSIM classic, which seems to work well across diverse environments. We did not find any comments/suggestions in the published papers suggesting alternative ones, so for now we used the same function. As more data from different environments are added to APSIM database, it will be possible to further test the photosynthetic temperature response in the future.
          LinearInterpolationFunction FVPD
            XYPairs: X=[0, 10, 50]; Y=[1, 1, 1]
            VariableReference XValue: VariableName=[Leaf].Photosynthesis.VPD
          LinearInterpolationFunction FN
            XYPairs: X=[0, 1, 1.5]; Y=[0, 1, 1]
            VariableReference XValue: VariableName=[Leaf].Fn
          LinearInterpolationFunction FW
            XYPairs: X=[0, 1]; Y=[0, 1]
            VariableReference XValue: VariableName=[Leaf].Fw
          RUECO2Function FCO2: PhotosyntheticPathway=C3
          VariableReference RadnInt: VariableName=[Leaf].RadiationIntercepted
        StomatalConductanceCO2Modifier
          VariableReference PhotosynthesisCO2Modifier: VariableName=[Leaf].Photosynthesis.FCO2
        MultiplyFunction Area
          VariableReference SLA: VariableName=[Leaf].SpecificArea
          VariableReference LeafLiveWt: VariableName=[Leaf].Live.Wt
        MinimumFunction FRGR
          VariableReference RUE_FT: VariableName=[Leaf].Photosynthesis.FT
          VariableReference RUE_FN: VariableName=[Leaf].Photosynthesis.FN
          VariableReference RUE_FVPD: VariableName=[Leaf].Photosynthesis.FVPD
        LinearInterpolationFunction ExtinctionCoefficient
          XYPairs: X=[200, 1000]; Y=[0.6, 0.4]
          VariableReference XValue: VariableName=[Soybean].SowingData.RowSpacing
        LinearInterpolationFunction HeightFunction
          XYPairs: X=[1, 2, 3, 4, 5, 6, 9]; Y=[0, 0, 50, 400, 700, 900, 1000]
          VariableReference XValue: VariableName=[Phenology].Stage
        AddFunction NodeNumber
          Constant Initial: FixedValue=0
          AccumulateFunction Change: StartStageName=Emergence; EndStageName=EndCanopyDevelopment; FractionRemovedOnCut=1; FractionRemovedOnHarvest=1; FractionRemovedOnGraze=1; FractionRemovedOnPrune=0
            DivideFunction DeltaNode
              VariableReference ThermalTime: VariableName=[Phenology].VegetativeThermalTime
              VariableReference Phyllochron: VariableName=[Leaf].Phyllochron
        Constant NReallocationFactor: FixedValue=1
          Memo
            This model assumes that all metabolic and storage N is available for reallocation from senescing leaves.
        PhaseLookup SenescenceRate
          PhaseLookupValue Vegetative: Start=Emergence; End=EndCanopyDevelopment
            Constant Rate: FixedValue=0
          PhaseLookupValue Reproductive: Start=EndCanopyDevelopment; End=Maturity
            DivideFunction Rate
              VariableReference TT: VariableName=[Phenology].ThermalTime
              SubtractFunction TTRemaining
                ExpressionFunction TTRequired
                  Expression=[Phenology].MidGrainFilling.Target + [Phenology].LateGrainFilling.Target + [Phenology].Maturing.Target
                ExpressionFunction TTComplete
                  Expression=[Phenology].MidGrainFilling.ProgressThroughPhase + [Phenology].LateGrainFilling.ProgressThroughPhase + [Phenology].Maturing.ProgressThroughPhase
            Memo
              Leaf senescence rate is calculated to ensure that all leaves are senesced by crop maturity.
            Memo Memo1
              There is no data on detachment rates and so a simple value was chosen to ensure that leaves were not retained in the canopy. In the future, with more data available a thermal time basis leaf detachment rate will be explored.
        Constant DetachmentRate: FixedValue=0.05; Units=/d
        Constant InitialWt: FixedValue=1
        MultiplyFunction LAIDead
          VariableReference SLA: VariableName=[Leaf].SpecificArea
          VariableReference LeafDeadWt: VariableName=[Leaf].Dead.Wt
        LinearInterpolationFunction MaximumNConc
          XYPairs: X=[3, 4, 9]; Y=[0.06, 0.05, 0.03]
          VariableReference XValue: VariableName=[Phenology].Stage
          Memo
            These values have been fitted to the available data. The fitted values are within the observed maximum and minimum values obtained in the FACTS soybean experiments ([ARCHONTOULIS2020721]).
        LinearInterpolationFunction CriticalNConc
          XYPairs: X=[3, 4, 9]; Y=[0.06, 0.05, 0.03]
          VariableReference XValue: VariableName=[Phenology].Stage
        Constant MinimumNConc: FixedValue=0.02
        Constant MaintenanceRespiration: FixedValue=0; Units=0-1
        Constant DMConversionEfficiency: FixedValue=1; Units=0-1
        BiomassRemoval BiomassRemovalDefaults: HarvestFractionLiveToRemove=0; HarvestFractionDeadToRemove=0; HarvestFractionLiveToResidue=1; HarvestFractionDeadToResidue=1
        Constant NRetranslocationFactor: FixedValue=0.5
        Constant DMReallocationFactor: FixedValue=0
        Constant DMRetranslocationFactor: FixedValue=0
        Constant RemobilisationCost: FixedValue=0
        Constant CarbonConcentration: FixedValue=0.4
        NutrientDemandFunctions DMDemands
          DivideFunction Structural
            PhaseLookup DeltaLAIPotential
              Memo
                DeltaLAI describes the LAI variation over the cycle and is calculated using the Area of Largest Leaf, relative leaf area, plant number, branch number and leaf appearance rate (thermal time/phyllochron).
              PhaseLookupValue Vegetative: Start=Emergence; End=EndCanopyDevelopment
                MultiplyFunction Delta
                  VariableReference AreaLargestLeaf: VariableName=[Leaf].AreaLargestLeaf
                  PhaseLookup RelativeArea
                    PhaseLookupValue BeforeEndPod: Start=Emergence; End=StartPodDevelopment
                      LinearInterpolationFunction RelativeArea
                        XYPairs: X=[2, 7, 10, 18]; Y=[0.6666, 1, 1, 0.83]
                        VariableReference XValue: VariableName=[Leaf].NodeNumber
                    PhaseLookupValue AfterEndPod: Start=StartPodDevelopment; End=EndCanopyDevelopment
                      Constant RelativeArea: FixedValue=0.4
                  VariableReference PlantNumber: VariableName=[Soybean].SowingData.Population
                  LinearInterpolationFunction Branches
                    XYPairs: X=[0, 6, 7, 8, 9]; Y=[1, 1, 2, 2, 2]
                    VariableReference XValue: VariableName=[Leaf].NodeNumber
                  DivideFunction LAR
                    VariableReference TT: VariableName=[Phenology].VegetativeThermalTime
                    VariableReference Phyllochron: VariableName=[Leaf].Phyllochron
              PhaseLookupValue Reproductive: Start=EndCanopyDevelopment; End=Maturity
                Constant: FixedValue=0
            VariableReference SLA: VariableName=[Leaf].SpecificArea
            Memo
              Growth in leaf area is used to calculate the leaf dry matter demand. The same was assumed in the original crop models in APSIM. Further model development can be taken once new experimental data for metabolic, structural and storage forms are provided.
            Memo Memo1
              DeltaLAI describes the LAI variation over the cycle and is calculated using the Area of Largest Leaf, relative leaf area, plant number, branch number and leaf appearance rate (thermal time/phyllochron).
          Constant Storage: FixedValue=0
          Constant Metabolic: FixedValue=0
          Constant QStructuralPriority: FixedValue=1
          Constant QMetabolicPriority: FixedValue=1
          Constant QStoragePriority: FixedValue=1
        NutrientDemandFunctions NDemands
          MultiplyFunction Structural
            VariableReference MinNconc: VariableName=[Leaf].minimumNconc
            VariableReference PotentialDMAllocation: VariableName=[Leaf].potentialDMAllocation.Structural
          MultiplyFunction Metabolic
            SubtractFunction MetabolicNconc
              VariableReference CritNconc: VariableName=[Leaf].criticalNConc
              VariableReference MinNconc: VariableName=[Leaf].minimumNconc
            VariableReference PotentialDMAllocation: VariableName=[Leaf].potentialDMAllocation.Structural
          StorageNDemandFunction Storage
            Constant NitrogenDemandSwitch: FixedValue=1
            VariableReference MaxNconc: VariableName=[Leaf].maximumNconc
          Constant QStructuralPriority: FixedValue=1
          Constant QMetabolicPriority: FixedValue=1
          Constant QStoragePriority: FixedValue=1
        LinearInterpolationFunction FrostFraction
          XYPairs: X=[-4, 4]; Y=[1, 0]
          VariableReference XValue: VariableName=[Weather].MinT
        LinearInterpolationFunction SpecificArea
          XYPairs: X=[0.1, 6]; Y=[0.03, 0.03]
          VariableReference XValue: VariableName=[Leaf].LAI
        Constant AreaLargestLeaf: FixedValue=0.006
        Constant Phyllochron: FixedValue=45
      ReproductiveOrgan Grain: GrowthRespiration=0; MaintenanceRespiration=0
        Biomass Live
        Biomass Dead
        Constant PotentialHarvestIndex: FixedValue=0.5
        AddFunction FillingDuration
          VariableReference EarlyGrainFillingDuration: VariableName=[Phenology].EarlyGrainFilling.Target
          VariableReference MidGrainFillingDuration: VariableName=[Phenology].MidGrainFilling.Target
          VariableReference LateGrainFillingDuration: VariableName=[Phenology].LateGrainFilling.Target
        PhaseLookup DMDemandFunction
          PhaseLookupValue GrainFilling: Start=StartGrainFilling; End=EndGrainFill
            MultiplyFunction HIGrainDemand
              VariableReference AboveGroundWt: VariableName=[AboveGround].Wt
              DivideFunction HarvestIndexIncrease
                VariableReference PotentialHarvestIndex: VariableName=[Grain].PotentialHarvestIndex
                VariableReference FillingDuration: VariableName=[Grain].FillingDuration
              VariableReference ThermalTime: VariableName=[Phenology].ThermalTime
        Constant MinimumNConc: FixedValue=0.05
        Constant MaximumNConc: FixedValue=0.058
        Constant WaterContent: FixedValue=0.12
        MultiplyFunction NFillingRate
          VariableReference NConc: VariableName=[Grain].MaximumNConc
          VariableReference DMDemand: VariableName=[Grain].DMDemandFunction
          VariableReference DMConversionEfficiency: VariableName=[Grain].DMConversionEfficiency
        BiomassRemoval BiomassRemovalDefaults: HarvestFractionLiveToRemove=1; HarvestFractionDeadToRemove=1; HarvestFractionLiveToResidue=0; HarvestFractionDeadToResidue=0
        Constant DMConversionEfficiency: FixedValue=0.89
        Constant RemobilisationCost: FixedValue=0
        Constant CarbonConcentration: FixedValue=0.4
        DivideFunction HarvestIndex
          VariableReference GrainWt: VariableName=[Grain].Wt
          VariableReference AboveGroundWt: VariableName=[AboveGround].Wt
        Constant MaximumPotentialGrainSize: FixedValue=0
          Memo
            This parameter is not used.  Grain growth is calculated from harvest index increase.
        Constant NumberFunction: FixedValue=0
          Memo
            Grain number is not estimated by this model.
        NutrientPoolFunctions DMDemandPriorityFactors
          Constant Structural: FixedValue=1
          Constant Metabolic: FixedValue=1
          Constant Storage: FixedValue=1
        NutrientPoolFunctions NDemandPriorityFactors: same as Replacements.Soybean.Grain.DMDemandPriorityFactors
      Root: GrowthRespiration=0; MaintenanceRespiration=0
        MultiplyFunction RootFrontVelocity
          PhaseLookup PotentialRootFrontVelocity
            PhaseLookupValue PreEmergence: Start=Germination; End=Emergence
              Constant Function: FixedValue=5
            PhaseLookupValue early: Start=Emergence; End=StartGrainFilling
              Constant Function: FixedValue=30
            PhaseLookupValue late: Start=StartGrainFilling; End=Maturity
              Constant Function: FixedValue=5
          LinearInterpolationFunction WaterFactor
            SoilWaterScale
            XYPairs: X=[0, 0.25, 1]; Y=[1, 1, 1]
            VariableReference XValue: VariableName=[SoilWaterScale]
          LinearInterpolationFunction AFPSFactor
            XYPairs: X=[0, 0.03, 1]; Y=[1, 1, 1]
            VariableReference XValue: VariableName=[Root].AirFilledPoreSpace
        Constant MaximumRootDepth: FixedValue=1000000
          Memo
            There is no intrinsic limit to maximum rooting depth.  Roots will be limited by the depth of the soil profile, or via values of XF in each layer.
        RootShapeCylinder RootShape
        Constant KLModifier: FixedValue=1; Units=0-1
          Memo
            No modification to water extraction rate is assumed in this model.
        LinearInterpolationFunction MaxDailyNUptake
          XYPairs: X=[0, 5]; Y=[1, 3]
          VariableReference XValue: VariableName=[Leaf].LAI
        Constant SenescenceRate: FixedValue=0.005; Units=/d
          Memo
            Roots are assumed to simply senesce at a small and constant rate during the entire growth period.
        Constant MaximumNConc: FixedValue=0.01
        Constant MinimumNConc: FixedValue=0.005
        PhaseLookupValue NitrogenDemandSwitch: Start=Emergence; End=EndGrainFill
          Constant: FixedValue=1
        Constant KNO3: FixedValue=0.02
        Constant KNH4: FixedValue=0
          Memo
            The current model version considers only NO3 uptake but NH4 option can be activated by the user . We do not expect activation of NH4 to change total plant N uptake because the nitrification rate (conversion of NH4 to NO3) is very fast in the model. In the future we will re-valuate this.
        BiomassRemoval BiomassRemovalDefaults: HarvestFractionLiveToRemove=0; HarvestFractionDeadToRemove=0; HarvestFractionLiveToResidue=0.2; HarvestFractionDeadToResidue=0
        LinearInterpolationFunction NUptakeSWFactor
          XYPairs: X=[0, 1]; Y=[0, 1]
          VariableReference XValue: VariableName=[Root].RWC
        Constant SpecificRootLength: FixedValue=40; Units=m/g
        Constant DMConversionEfficiency: FixedValue=1
        Constant MaintenanceRespirationFunction: FixedValue=1
        Constant RemobilisationCost: FixedValue=0
        Constant CarbonConcentration: FixedValue=0.4
        NutrientDemandFunctions DMDemands
          MultiplyFunction Structural
            PartitionFractionDemandFunction DMDemandFunction
              PhaseLookup PartitionFraction
                PhaseLookupValue Early: Start=Emergence; End=StartFlowering
                  Constant Function: FixedValue=0.2
                PhaseLookupValue Middle: Start=StartFlowering; End=StartGrainFilling
                  Constant Function: FixedValue=0.2
                PhaseLookupValue Late: Start=StartGrainFilling; End=Maturity
                  Constant Function: FixedValue=0.05
            Constant StructuralFraction: FixedValue=1
          Constant Metabolic: FixedValue=0
          StorageDMDemandFunction Storage
            SubtractFunction StorageFraction
              Constant One: FixedValue=1
              VariableReference StructuralFraction: VariableName=[Root].DMDemands.Structural.StructuralFraction
          Constant QStructuralPriority: FixedValue=1
          Constant QMetabolicPriority: FixedValue=1
          Constant QStoragePriority: FixedValue=1
        NutrientDemandFunctions NDemands
          MultiplyFunction Structural
            VariableReference MinNconc: VariableName=[Root].minimumNconc
            VariableReference PotentialDMAllocation: VariableName=[Root].potentialDMAllocation.Structural
          MultiplyFunction Metabolic
            SubtractFunction MetabolicNconc
              VariableReference CritNconc: VariableName=[Root].criticalNConc
              VariableReference MinNconc: VariableName=[Root].minimumNconc
            VariableReference PotentialDMAllocation: VariableName=[Root].potentialDMAllocation.Structural
          StorageNDemandFunction Storage
            VariableReference NitrogenDemandSwitch: VariableName=[Root].nitrogenDemandSwitch
            VariableReference MaxNconc: VariableName=[Root].maximumNconc
          Constant QStructuralPriority: FixedValue=1
          Constant QMetabolicPriority: FixedValue=1
          Constant QStoragePriority: FixedValue=1
        VariableReference CriticalNConc: VariableName=[Root].MinimumNConc
        NutrientPoolFunctions InitialWt
          Constant Structural: FixedValue=0.2; Units=g/plant
          Constant Metabolic: FixedValue=0
          Constant Storage: FixedValue=0
      Nodule
        Constant FixationMetabolicCost: FixedValue=0
        Constant MaximumNConc: FixedValue=0.02
        Constant MinimumNConc: FixedValue=0.01
        Constant SenescenceRate: FixedValue=0
        Constant NReallocationFactor: FixedValue=0
        PhaseLookupValue NitrogenDemandSwitch: Start=Emergence; End=EndGrainFill
          Constant: FixedValue=1
        BiomassRemoval BiomassRemovalDefaults: HarvestFractionLiveToRemove=0; HarvestFractionDeadToRemove=0; HarvestFractionLiveToResidue=0.2; HarvestFractionDeadToResidue=0
        Constant InitialWtFunction: FixedValue=0; Units=g/m^2
        Constant DetachmentRateFunction: FixedValue=0; Units=/d
        Constant MaintenanceRespirationFunction: FixedValue=0; Units=0-1
        Constant DMConversionEfficiency: FixedValue=1; Units=0-1
        Constant NRetranslocationFactor: FixedValue=0
        Constant DMReallocationFactor: FixedValue=0
        Constant DMRetranslocationFactor: FixedValue=0
        VariableReference CriticalNConc: VariableName=[Nodule].MinimumNConc
        Constant RemobilisationCost: FixedValue=0
        Constant CarbonConcentration: FixedValue=0.4
        HoldFunction FixationRate: WhenToHold=StartGrainFilling
          MinimumFunction DailyPotentialFixationRate
            MultiplyFunction PotentialFixationRate
              VariableReference LiveBiomass: VariableName=[AboveGroundLive].Wt
              PhaseLookup SpecificFixationRate
                PhaseLookupValue VegetativeGrowth: Start=Emergence; End=StartFlowering
                  Constant Rate: FixedValue=0.006
                PhaseLookupValue ReproductiveGrowth: Start=StartFlowering; End=EndGrainFill
                  Constant Rate: FixedValue=0.002
            Constant MaximumFixationRate: FixedValue=0.6; Units=g/g
        NutrientPoolFunctions DMDemands
          MultiplyFunction Structural
            PartitionFractionDemandFunction DMDemandFunction
              PhaseLookup PartitionFraction
                PhaseLookupValue Early: Start=Emergence; End=StartFlowering
                  Constant Function: FixedValue=0.03
                PhaseLookupValue Middle: Start=StartFlowering; End=StartGrainFilling
                  Constant Function: FixedValue=0.02
                PhaseLookupValue Late: Start=StartGrainFilling; End=Maturity
                  Constant Function: FixedValue=0
            Constant StructuralFraction: FixedValue=1; Units=g/g
          Constant Metabolic: FixedValue=0
          StorageDMDemandFunction Storage
            SubtractFunction StorageFraction
              Constant One: FixedValue=1
              VariableReference StructuralFraction: VariableName=[Nodule].DMDemands.Structural.StructuralFraction
        NutrientPoolFunctions NDemands
          MultiplyFunction Structural
            VariableReference MinNconc: VariableName=[Nodule].minimumNconc
            VariableReference PotentialDMAllocation: VariableName=[Nodule].potentialDMAllocation.Structural
          MultiplyFunction Metabolic
            SubtractFunction MetabolicNconc
              VariableReference CritNconc: VariableName=[Nodule].criticalNConc
              VariableReference MinNconc: VariableName=[Nodule].minimumNconc
            VariableReference PotentialDMAllocation: VariableName=[Nodule].potentialDMAllocation.Structural
          StorageNDemandFunction Storage
            VariableReference NitrogenDemandSwitch: VariableName=[Nodule].nitrogenDemandSwitch
            VariableReference MaxNconc: VariableName=[Nodule].maximumNconc
      GenericOrgan Shell: IsAboveGround=true
        Constant NReallocationFactor: FixedValue=1
        Constant NRetranslocationFactor: FixedValue=0.5
        Constant MaximumNConc: FixedValue=0.045
        VariableReference CriticalNConc: VariableName=[Shell].MinimumNConc
        Constant MinimumNConc: FixedValue=0.01
        Constant DMRetranslocationFactor: FixedValue=0.1
        PhaseLookupValue NitrogenDemandSwitch: Start=StartPodDevelopment; End=EndPodDevelopment
          Constant: FixedValue=1
        BiomassRemoval BiomassRemovalDefaults: HarvestFractionLiveToRemove=0; HarvestFractionDeadToRemove=0; HarvestFractionLiveToResidue=1; HarvestFractionDeadToResidue=1
        PhaseLookup SenescenceRate
          PhaseLookupValue ReproductivePhase: Start=StartPodDevelopment; End=Maturity
            MinimumFunction Rate
              DivideFunction Fraction
                VariableReference TT: VariableName=[Phenology].ThermalTime
                SubtractFunction TTRemaining
                  ExpressionFunction ReproductiveTT
                    Expression=[Phenology].EarlyPodDevelopment.Target+[Phenology].EarlyGrainFilling.Target+[Phenology].MidGrainFilling.Target+[Phenology].LateGrainFilling.Target
                  ExpressionFunction ReproductiveTT1Complete
                    Expression=[Phenology].EarlyPodDevelopment.ProgressThroughPhase+[Phenology].EarlyGrainFilling.ProgressThroughPhase+[Phenology].MidGrainFilling.ProgressThroughPhase+[Phenology].LateGrainFilling.ProgressThroughPhase
              Constant One: FixedValue=1
        Constant DetachmentRateFunction: FixedValue=0; Units=/d
        Constant MaintenanceRespirationFunction: FixedValue=0; Units=0-1
        Constant DMConversionEfficiency: FixedValue=1; Units=0-1
        Constant DMReallocationFactor: FixedValue=0
        Constant RemobilisationCost: FixedValue=0
        Constant CarbonConcentration: FixedValue=0.4
        Constant PotentialHarvestIndex: FixedValue=0.2
        AddFunction FillingDuration
          VariableReference EarlyPodDevelopmentDuration: VariableName=[Phenology].EarlyPodDevelopment.Target
          VariableReference EarlyGrainFillingDuration: VariableName=[Phenology].EarlyGrainFilling.Target
          VariableReference MidGrainFillingDuration: VariableName=[Phenology].MidGrainFilling.Target
        NutrientDemandFunctions DMDemands
          MultiplyFunction Structural
            PhaseLookup DMDemandFunction
              PhaseLookupValue PodDevelopment: Start=StartPodDevelopment; End=EndPodDevelopment
                MultiplyFunction HIPodDemand
                  VariableReference AboveGroundWt: VariableName=[AboveGround].Wt
                  DivideFunction HarvestIndexIncrease
                    VariableReference PotentialHarvestIndex: VariableName=[Shell].PotentialHarvestIndex
                    VariableReference FillingDuration: VariableName=[Shell].FillingDuration
                  VariableReference ThermalTime: VariableName=[Phenology].ThermalTime
            Constant StructuralFraction: FixedValue=1
            Memo
              Shell harvest index is used to calculate shell biomass demand, which follows the same approach than grain harvest index. It represents the fraction of shell biomass in relation to total aboveground biomass.
          Constant Metabolic: FixedValue=0
          StorageDMDemandFunction Storage
            SubtractFunction StorageFraction
              Constant One: FixedValue=1
              VariableReference StructuralFraction: VariableName=[Shell].DMDemands.Structural.StructuralFraction
          Constant QStructuralPriority: FixedValue=1
          Constant QMetabolicPriority: FixedValue=1
          Constant QStoragePriority: FixedValue=1
        NutrientDemandFunctions NDemands
          MultiplyFunction Structural
            VariableReference MinNconc: VariableName=[Shell].minimumNconc
            VariableReference PotentialDMAllocation: VariableName=[Shell].potentialDMAllocation.Structural
          StorageNDemandFunction Storage
            VariableReference NitrogenDemandSwitch: VariableName=[Shell].nitrogenDemandSwitch
            VariableReference MaxNconc: VariableName=[Shell].maximumNconc
          Constant Metabolic: FixedValue=0
          Constant QStructuralPriority: FixedValue=1
          Constant QMetabolicPriority: FixedValue=1
          Constant QStoragePriority: FixedValue=1
        RetranslocateNonStructural RetranslocateNitrogen
        NutrientPoolFunctions InitialWt
          Constant Structural: FixedValue=0; Units=g/m^2
          Constant Metabolic: FixedValue=0
          Constant Storage: FixedValue=0
        Constant Photosynthesis: FixedValue=0
        VariableReference initialNConcFunction: VariableName=[Shell].MinimumNConc
      GenericOrgan Stem: IsAboveGround=true
        Constant NReallocationFactor: FixedValue=1
        Constant NRetranslocationFactor: FixedValue=0.5
        PhaseLookup DMRetranslocationFactor
          PhaseLookupValue GrainFilling: Start=EndCanopyDevelopment; End=EndGrainFill
            Constant RetranslocationFactor: FixedValue=0.2
        LinearInterpolationFunction MaximumNConc
          XYPairs: X=[3, 4, 5]; Y=[0.025, 0.02, 0.015]
          VariableReference XValue: VariableName=[Phenology].Stage
        Constant MinimumNConc: FixedValue=0.006
        PhaseLookupValue NitrogenDemandSwitch: Start=Emergence; End=StartGrainFilling
          Memo
            There is no evidence of stem N storage during grain filling. Also, there is no stem structural growth during this time.
          Constant: FixedValue=1
        BiomassRemoval BiomassRemovalDefaults: HarvestFractionLiveToRemove=0; HarvestFractionDeadToRemove=0; HarvestFractionLiveToResidue=1; HarvestFractionDeadToResidue=1
        PhaseLookup SenescenceRate
          PhaseLookupValue PostCanopyPhase: Start=EndCanopyDevelopment; End=Maturity
            MinimumFunction Rate
              DivideFunction Fraction
                VariableReference TT: VariableName=[Phenology].ThermalTime
                SubtractFunction TTRemaining
                  ExpressionFunction PostCanopyTT
                    Expression=[Phenology].EarlyPodDevelopment.Target+[Phenology].EarlyGrainFilling.Target+[Phenology].MidGrainFilling.Target+[Phenology].LateGrainFilling.Target
                  ExpressionFunction PostCanopyTTComplete
                    Expression=[Phenology].MidGrainFilling.ProgressThroughPhase+[Phenology].LateGrainFilling.ProgressThroughPhase
              Constant One: FixedValue=1
        Constant DetachmentRateFunction: FixedValue=0; Units=/d
        Constant MaintenanceRespirationFunction: FixedValue=0; Units=0-1
        Constant DMConversionEfficiency: FixedValue=1; Units=0-1
        Constant DMReallocationFactor: FixedValue=0
        VariableReference CriticalNConc: VariableName=[Stem].MinimumNConc
        Constant RemobilisationCost: FixedValue=0
        Constant CarbonConcentration: FixedValue=0.4
        NutrientDemandFunctions DMDemands
          MultiplyFunction Structural
            PhaseLookup Fraction
              PhaseLookupValue StemGrowthPhase: Start=Emergence; End=StartPodDevelopment
                Constant Fraction: FixedValue=0.75
              PhaseLookupValue PodAndGrainGrowth: Start=StartPodDevelopment; End=EndGrainFill
                Constant Fraction: FixedValue=0
            VariableReference DMDemand: VariableName=[Stem].PotentialGrowth
          Constant Metabolic: FixedValue=0
          MultiplyFunction Storage
            VariableReference DMDemand: VariableName=[Stem].PotentialGrowth
            SubtractFunction StorageFraction
              Constant One: FixedValue=1
              VariableReference StructuralFraction: VariableName=[Stem].DMDemands.Structural.Fraction
          Constant QStructuralPriority: FixedValue=1
          Constant QMetabolicPriority: FixedValue=1
          Constant QStoragePriority: FixedValue=1
        NutrientDemandFunctions NDemands
          MultiplyFunction Structural
            VariableReference MinNconc: VariableName=[Stem].minimumNconc
            VariableReference PotentialDMAllocation: VariableName=[Stem].potentialDMAllocation.Structural
          MultiplyFunction Metabolic
            SubtractFunction MetabolicNconc
              VariableReference CritNconc: VariableName=[Stem].criticalNConc
              VariableReference MinNconc: VariableName=[Stem].minimumNconc
            VariableReference PotentialDMAllocation: VariableName=[Stem].potentialDMAllocation.Structural
          StorageNDemandFunction Storage
            VariableReference NitrogenDemandSwitch: VariableName=[Stem].nitrogenDemandSwitch
            VariableReference MaxNconc: VariableName=[Stem].maximumNconc
          Constant QStructuralPriority: FixedValue=1
          Constant QMetabolicPriority: FixedValue=1
          Constant QStoragePriority: FixedValue=1
        PartitionFractionDemandFunction PotentialGrowth
          PhaseLookup PartitionFraction
            PhaseLookupValue StemGrowthPhase: Start=Emergence; End=EndPodDevelopment
              Constant StemFraction: FixedValue=0.4
            PhaseLookupValue GrainFilling: Start=EndPodDevelopment; End=EndGrainFill
              Constant StemFraction: FixedValue=0
        RetranslocateNonStructural RetranslocateNitrogen
        NutrientPoolFunctions InitialWt: same as Replacements.Soybean.Shell.InitialWt
        Constant Photosynthesis: FixedValue=0
        VariableReference initialNConcFunction: VariableName=[Stem].MinimumNConc
      CompositeBiomass AboveGround: OrganNames=[Leaf, Stem, Grain, Shell]; IncludeLive=true; IncludeDead=true
      CompositeBiomass BelowGround: OrganNames=[Root, Nodule]; IncludeLive=true; IncludeDead=true
      CompositeBiomass AboveGroundLive: OrganNames=[Leaf, Stem, Grain, Shell]; IncludeLive=true; IncludeDead=false
      CompositeBiomass Total: OrganNames=[Leaf, Stem, Grain, Shell, Root, Nodule]; IncludeLive=true; IncludeDead=true
      CompositeBiomass TotalLive: OrganNames=[Leaf, Stem, Grain, Shell, Root, Nodule]; IncludeLive=true; IncludeDead=false
      CompositeBiomass TotalDead: OrganNames=[Leaf, Stem, Grain, Shell, Root, Nodule]; IncludeLive=false; IncludeDead=true
      CompositeBiomass Pod: OrganNames=[Shell, Grain]; IncludeLive=true; IncludeDead=true
      Constant MortalityRate: FixedValue=0
      Constant SeedMortalityRate: FixedValue=0
      Folder Cultivars
        Folder Australia
          Cultivar Buchanan
            Command:
              [Phenology].Vegetative.Target.FixedValue = 480
              [Phenology].EarlyFlowering.Target.FixedValue = 100
              [Phenology].EarlyGrainFilling.Target.FractionofGrainfilling.FixedValue = 0.015
              [Phenology].LateGrainFilling.Target.EntireGrainfillPeriod.FixedValue = 467
              [Phenology].VegetativePhotoperiodModifier.XYPairs.X = 12.39, 15.61
              [Phenology].ReproductivePhotoperiodModifier.XYPairs.X = 12.39, 15.61
              [Phenology].MidGrainFilling.Target.FractionofMidToLateGrainfilling.FixedValue=0.33
              [Grain].MaximumNConc.FixedValue = 0.067
              [Stem].PotentialGrowth.PartitionFraction.StemGrowthPhase.StemFraction.FixedValue = 0.5
              [Leaf].AreaLargestLeaf.FixedValue=0.009
          Cultivar Djakal
            Command:
              [Phenology].Vegetative.Target.FixedValue = 380
              [Phenology].EarlyFlowering.Target.FixedValue = 100
              [Phenology].EarlyGrainFilling.Target.FractionofGrainfilling.FixedValue = 0.05
              [Phenology].LateGrainFilling.Target.EntireGrainfillPeriod.FixedValue = 405
              [Phenology].VegetativePhotoperiodModifier.XYPairs.X = 13.75, 17
              [Phenology].ReproductivePhotoperiodModifier.XYPairs.X = 11.9, 15.5
              [Leaf].AreaLargestLeaf.FixedValue=0.009
          Cultivar Davis
            Command:
              [Phenology].Vegetative.Target.FixedValue = 480
              [Phenology].EarlyFlowering.Target.FixedValue = 100
              [Phenology].EarlyGrainFilling.Target.FractionofGrainfilling.FixedValue = 0.015
              [Phenology].LateGrainFilling.Target.EntireGrainfillPeriod.FixedValue = 467
              [Phenology].VegetativePhotoperiodModifier.XYPairs.X = 12.39, 15.61
              [Phenology].ReproductivePhotoperiodModifier.XYPairs.X = 12.39, 15.61
              [Phenology].MidGrainFilling.Target.FractionofMidToLateGrainfilling.FixedValue=0.33
              [Grain].MaximumNConc.FixedValue = 0.067
              [Stem].PotentialGrowth.PartitionFraction.StemGrowthPhase.StemFraction.FixedValue = 0.5
              [Leaf].AreaLargestLeaf.FixedValue=0.012
          Cultivar Hooper_MG40
            Command:
              [Phenology].Vegetative.Target.FixedValue = 380
              [Phenology].EarlyFlowering.Target.FixedValue = 80
              [Phenology].EarlyGrainFilling.Target.FractionofGrainfilling.FixedValue = 0.05
              [Phenology].LateGrainFilling.Target.EntireGrainfillPeriod.FixedValue = 440
              [Phenology].VegetativePhotoperiodModifier.XYPairs.X = 13.26, 16.67
              [Phenology].ReproductivePhotoperiodModifier.XYPairs.X = 13.26, 16.67
              [Leaf].AreaLargestLeaf.FixedValue=0.009
          Cultivar Stephens_MG40
            Command:
              [Phenology].Vegetative.Target.FixedValue = 360
              [Phenology].EarlyFlowering.Target.FixedValue = 80
              [Phenology].EarlyGrainFilling.Target.FractionofGrainfilling.FixedValue = 0.05
              [Phenology].LateGrainFilling.Target.EntireGrainfillPeriod.FixedValue = 440
              [Phenology].VegetativePhotoperiodModifier.XYPairs.X = 13.26, 16.67
              [Phenology].ReproductivePhotoperiodModifier.XYPairs.X = 13.26, 16.67
              [Leaf].AreaLargestLeaf.FixedValue=0.009
          Cultivar FiskebyV
            Command:
              [Phenology].Vegetative.Target.FixedValue = 285
              [Phenology].EarlyFlowering.Target.FixedValue = 80
              [Phenology].EarlyGrainFilling.Target.FractionofGrainfilling.FixedValue = 0.05
              [Phenology].LateGrainFilling.Target.EntireGrainfillPeriod.FixedValue = 405
              [Phenology].VegetativePhotoperiodModifier.XYPairs.X = 13.75, 18
              [Phenology].ReproductivePhotoperiodModifier.XYPairs.X = 13.75, 18
            Memo
              Early-maturing, photoperiod-insensitive cultivar developed in Sweden for high latitude environments
          Cultivar F148_7
            Command:
              [Phenology].Vegetative.Target.FixedValue = 314
              [Phenology].EarlyFlowering.Target.FixedValue = 80
              [Phenology].EarlyGrainFilling.Target.FractionofGrainfilling.FixedValue = 0.05
              [Phenology].LateGrainFilling.Target.EntireGrainfillPeriod.FixedValue = 485
              [Phenology].VegetativePhotoperiodModifier.XYPairs.X = 13.75, 17
              [Phenology].ReproductivePhotoperiodModifier.XYPairs.X = 12, 18
              [Leaf].AreaLargestLeaf.FixedValue=0.009
            Memo
              Indeterminate breeding selection from the national soybean breeding program combining phytophthora resistance, earliness,
              culinary quality, and yield
          Cultivar Bowyer
            Command:
              [Phenology].Vegetative.Target.FixedValue = 377
              [Phenology].EarlyFlowering.Target.FixedValue = 80
              [Phenology].EarlyGrainFilling.Target.FractionofGrainfilling.FixedValue = 0.05
              [Phenology].LateGrainFilling.Target.EntireGrainfillPeriod.FixedValue = 405
              [Phenology].VegetativePhotoperiodModifier.XYPairs.X = 13.75, 15.5
              [Phenology].ReproductivePhotoperiodModifier.XYPairs.X = 11.9, 15.5
            Memo
              Brown hilum cultivar, adapted to southern New South Wales, released by K McWhirter in 1982
          Cultivar Bunya
            Command:
              [Phenology].Vegetative.Target.FixedValue = 550
              [Phenology].EarlyFlowering.Target.FixedValue = 80
              [Phenology].EarlyGrainFilling.Target.FractionofGrainfilling.FixedValue = 0.05
              [Phenology].LateGrainFilling.Target.EntireGrainfillPeriod.FixedValue = 405
              [Phenology].VegetativePhotoperiodModifier.XYPairs.X = 13.75, 18
              [Phenology].ReproductivePhotoperiodModifier.XYPairs.X = 10.9, 15.5
              [Leaf].AreaLargestLeaf.FixedValue=0.009
            Memo
              Culinary cultivar released in 2006 by CSIRO with broad adaptation from northern New South Wales to northern Queensland
          Cultivar Cowrie
            Command:
              [Phenology].Vegetative.Target.FixedValue = 390
              [Phenology].EarlyFlowering.Target.FixedValue = 80
              [Phenology].EarlyGrainFilling.Target.FractionofGrainfilling.FixedValue = 0.05
              [Phenology].LateGrainFilling.Target.EntireGrainfillPeriod.FixedValue = 425
              [Phenology].VegetativePhotoperiodModifier.XYPairs.X = 12.75, 16
              [Phenology].ReproductivePhotoperiodModifier.XYPairs.X = 12.75, 16
              [Leaf].AreaLargestLeaf.FixedValue=0.009
            Memo
              Light hilum cultivar released by theNewSouth Wales Department of Agriculture for the coastal Northern Rivers District inNewSouth Wales
          Cultivar Soya791
            Command:
              [Phenology].Vegetative.Target.FixedValue = 430
              [Phenology].EarlyFlowering.Target.FixedValue = 80
              [Phenology].EarlyGrainFilling.Target.FractionofGrainfilling.FixedValue = 0.05
              [Phenology].LateGrainFilling.Target.EntireGrainfillPeriod.FixedValue = 425
              [Phenology].VegetativePhotoperiodModifier.XYPairs.X = 12.75, 15.3
              [Phenology].ReproductivePhotoperiodModifier.XYPairs.X = 12.75, 15.3
              [Leaf].AreaLargestLeaf.FixedValue=0.009
          Cultivar Manark
            Command:
              [Phenology].Vegetative.Target.FixedValue = 440
              [Phenology].EarlyFlowering.Target.FixedValue = 80
              [Phenology].EarlyGrainFilling.Target.FractionofGrainfilling.FixedValue = 0.05
              [Phenology].LateGrainFilling.Target.EntireGrainfillPeriod.FixedValue = 425
              [Phenology].VegetativePhotoperiodModifier.XYPairs.X = 12.75, 15
              [Phenology].ReproductivePhotoperiodModifier.XYPairs.X = 12.75, 15
              [Leaf].AreaLargestLeaf.FixedValue=0.009
          Cultivar Warrigal
            Command:
              [Phenology].Vegetative.Target.FixedValue = 490
              [Phenology].EarlyFlowering.Target.FixedValue = 80
              [Phenology].EarlyGrainFilling.Target.FractionofGrainfilling.FixedValue = 0.05
              [Phenology].LateGrainFilling.Target.EntireGrainfillPeriod.FixedValue = 425
              [Phenology].VegetativePhotoperiodModifier.XYPairs.X = 12.75, 15
              [Phenology].ReproductivePhotoperiodModifier.XYPairs.X = 12.75, 15
              [Leaf].AreaLargestLeaf.FixedValue=0.009
          Cultivar Leichhardt
            Command:
              [Phenology].Vegetative.Target.FixedValue = 806
              [Phenology].EarlyFlowering.Target.FixedValue = 80
              [Phenology].EarlyGrainFilling.Target.FractionofGrainfilling.FixedValue = 0.05
              [Phenology].LateGrainFilling.Target.EntireGrainfillPeriod.FixedValue = 425
              [Phenology].VegetativePhotoperiodModifier.XYPairs.X = 12.75, 14.7
              [Phenology].ReproductivePhotoperiodModifier.XYPairs.X = 12.75, 14.7
              [Leaf].AreaLargestLeaf.FixedValue=0.009
          Cultivar Djakal1
            Command:
              [Phenology].Vegetative.Target.FixedValue = 332
              [Phenology].EarlyFlowering.Target.FixedValue = 80
              [Phenology].EarlyGrainFilling.Target.FractionofGrainfilling.FixedValue = 0.05
              [Phenology].LateGrainFilling.Target.EntireGrainfillPeriod.FixedValue = 440
              [Phenology].VegetativePhotoperiodModifier.XYPairs.X = 13.26, 16.67
              [Phenology].ReproductivePhotoperiodModifier.XYPairs.X = 13.26, 16.67
              [Leaf].AreaLargestLeaf.FixedValue=0.009
        Folder USA
          Cultivar Trial_MG00
            Command:
              [Phenology].Vegetative.Target.FixedValue = 268
              [Phenology].EarlyFlowering.Target.FixedValue = 76
              [Phenology].EarlyGrainFilling.Target.FractionofGrainfilling.FixedValue = 0.05
              [Phenology].LateGrainFilling.Target.EntireGrainfillPeriod.FixedValue = 432
              [Phenology].VegetativePhotoperiodModifier.XYPairs.X = 14.43, 21.19
              [Phenology].ReproductivePhotoperiodModifier.XYPairs.X = 14.43, 21.19
          Cultivar Lambert_MG0
            Command:
              [Phenology].Vegetative.Target.FixedValue = 294
              [Phenology].EarlyFlowering.Target.FixedValue = 81
              [Phenology].EarlyGrainFilling.Target.FractionofGrainfilling.FixedValue = 0.05
              [Phenology].LateGrainFilling.Target.EntireGrainfillPeriod.FixedValue = 442
              [Phenology].VegetativePhotoperiodModifier.XYPairs.X = 14.29, 20.14
              [Phenology].ReproductivePhotoperiodModifier.XYPairs.X = 14.29, 20.14
          Cultivar IA1006_MG10
            Command:
              [Phenology].Vegetative.Target.FixedValue = 336
              [Phenology].EarlyFlowering.Target.FixedValue = 118
              [Phenology].EarlyGrainFilling.Target.FractionofGrainfilling.FixedValue = 0.05
              [Phenology].LateGrainFilling.Target.EntireGrainfillPeriod.FixedValue = 518
              [Phenology].VegetativePhotoperiodModifier.XYPairs.X = 14.37, 19.30
              [Phenology].ReproductivePhotoperiodModifier.XYPairs.X = 14.37, 19.30
          Cultivar IA2008_MG20
            Command:
              [Phenology].Vegetative.Target.FixedValue = 329
              [Phenology].EarlyFlowering.Target.FixedValue = 150
              [Phenology].EarlyGrainFilling.Target.FractionofGrainfilling.FixedValue = 0.05
              [Phenology].LateGrainFilling.Target.EntireGrainfillPeriod.FixedValue = 580
              [Phenology].VegetativePhotoperiodModifier.XYPairs.X = 13.92, 17.93
              [Phenology].ReproductivePhotoperiodModifier.XYPairs.X = 13.92, 17.93
          Cultivar PioneerP22T61_MG22
            Command:
              [Phenology].Vegetative.Target.FixedValue = 328
              [Phenology].EarlyFlowering.Target.FixedValue = 106
              [Phenology].EarlyGrainFilling.Target.FractionofGrainfilling.FixedValue = 0.3
              [Phenology].LateGrainFilling.Target.EntireGrainfillPeriod.FixedValue = 499
              [Phenology].VegetativePhotoperiodModifier.XYPairs.X = 13.59, 17.6
              [Phenology].ReproductivePhotoperiodModifier.XYPairs.X = 13.59, 17.6
          Cultivar PioneerP22T69R_MG22
            Command:
              [Phenology].Vegetative.Target.FixedValue = 328
              [Phenology].EarlyFlowering.Target.FixedValue = 106
              [Phenology].EarlyGrainFilling.Target.FractionofGrainfilling.FixedValue = 0.35
              [Phenology].LateGrainFilling.Target.EntireGrainfillPeriod.FixedValue = 580
              [Phenology].VegetativePhotoperiodModifier.XYPairs.X = 13.59, 17.6
              [Phenology].ReproductivePhotoperiodModifier.XYPairs.X = 13.59, 17.6
          Cultivar Pioneer92MGI_MG26
            Command:
              [Phenology].Vegetative.Target.FixedValue = 271
              [Phenology].EarlyFlowering.Target.FixedValue = 120
              [Phenology].EarlyGrainFilling.Target.FractionofGrainfilling.FixedValue = 0.125
              [Phenology].LateGrainFilling.Target.EntireGrainfillPeriod.FixedValue = 529
              [Phenology].VegetativePhotoperiodModifier.XYPairs.X = 13.77, 17.57
              [Phenology].ReproductivePhotoperiodModifier.XYPairs.X = 13.77, 17.57
          Cultivar PioneerP92Y75_MG27
            Command:
              [Phenology].Vegetative.Target.FixedValue = 328
              [Phenology].EarlyFlowering.Target.FixedValue = 106
              [Phenology].EarlyGrainFilling.Target.FractionofGrainfilling.FixedValue = 0.14
              [Phenology].LateGrainFilling.Target.EntireGrainfillPeriod.FixedValue = 499
              [Phenology].VegetativePhotoperiodModifier.XYPairs.X = 13.59, 17.6
              [Phenology].ReproductivePhotoperiodModifier.XYPairs.X = 13.59, 17.6
          Cultivar Macon_MG30
            Command:
              [Phenology].Vegetative.Target.FixedValue = 367
              [Phenology].EarlyFlowering.Target.FixedValue = 163
              [Phenology].EarlyGrainFilling.Target.FractionofGrainfilling.FixedValue = 0.175
              [Phenology].LateGrainFilling.Target.EntireGrainfillPeriod.FixedValue = 607
              [Phenology].VegetativePhotoperiodModifier.XYPairs.X = 14.05, 17.56
              [Phenology].ReproductivePhotoperiodModifier.XYPairs.X = 14.05, 17.56
          Cultivar PioneerP93M11_MG31
            Command:
              [Phenology].Vegetative.Target.FixedValue = 250
              [Phenology].EarlyFlowering.Target.FixedValue = 110
              [Phenology].EarlyGrainFilling.Target.FractionofGrainfilling.FixedValue = 0.30
              [Phenology].LateGrainFilling.Target.EntireGrainfillPeriod.FixedValue = 457
              [Phenology].VegetativePhotoperiodModifier.XYPairs.X = 13.4, 16.0
              [Phenology].ReproductivePhotoperiodModifier.XYPairs.X = 13.4, 16.0
              [Grain].MaximumNConc.FixedValue = 0.065
              [Shell].PotentialHarvestIndex.FixedValue = 0.5
              [Leaf].AreaLargestLeaf.FixedValue=0.013
          Cultivar Becks321NRR_MG32
            Command:
              [Phenology].Vegetative.Target.FixedValue = 272
              [Phenology].EarlyFlowering.Target.FixedValue = 117
              [Phenology].EarlyGrainFilling.Target.FractionofGrainfilling.FixedValue = 0.20
              [Phenology].LateGrainFilling.Target.EntireGrainfillPeriod.FixedValue = 522
              [Phenology].VegetativePhotoperiodModifier.XYPairs.X = 13.45, 18.0
              [Phenology].ReproductivePhotoperiodModifier.XYPairs.X = 13.45, 18.0
          Cultivar PioneerP932T16R_MG32
            Command:
              [Phenology].Vegetative.Target.FixedValue = 328
              [Phenology].EarlyFlowering.Target.FixedValue = 106
              [Phenology].EarlyGrainFilling.Target.FractionofGrainfilling.FixedValue = 0.40
              [Phenology].LateGrainFilling.Target.EntireGrainfillPeriod.FixedValue = 499
              [Phenology].VegetativePhotoperiodModifier.XYPairs.X = 13.59, 17.6
              [Phenology].ReproductivePhotoperiodModifier.XYPairs.X = 13.59, 17.6
          Cultivar Becks367NRR_MG37
            Command:
              [Phenology].Vegetative.Target.FixedValue = 267
              [Phenology].EarlyFlowering.Target.FixedValue = 112
              [Phenology].EarlyGrainFilling.Target.FractionofGrainfilling.FixedValue = 0.26
              [Phenology].LateGrainFilling.Target.EntireGrainfillPeriod.FixedValue = 506
              [Phenology].VegetativePhotoperiodModifier.XYPairs.X = 13.27, 17.2
              [Phenology].ReproductivePhotoperiodModifier.XYPairs.X = 13.27, 17.2
          Cultivar AsgrowAG4403_MG40
            Command:
              [Phenology].Vegetative.Target.FixedValue = 292
              [Phenology].EarlyFlowering.Target.FixedValue = 123
              [Phenology].EarlyGrainFilling.Target.FractionofGrainfilling.FixedValue = 0.30
              [Phenology].LateGrainFilling.Target.EntireGrainfillPeriod.FixedValue = 535
              [Phenology].VegetativePhotoperiodModifier.XYPairs.X = 13.09, 16.49
              [Phenology].ReproductivePhotoperiodModifier.XYPairs.X = 13.09, 16.49
          Cultivar HornbeckHBK4891_MG40: same as Replacements.Soybean.Cultivars.USA.AsgrowAG4403_MG40
          Cultivar Pioneer94B01_MG40
            Command:
              [Phenology].Vegetative.Target.FixedValue = 322
              [Phenology].EarlyFlowering.Target.FixedValue = 143
              [Phenology].EarlyGrainFilling.Target.FractionofGrainfilling.FixedValue = 0.30
              [Phenology].LateGrainFilling.Target.EntireGrainfillPeriod.FixedValue = 567
              [Phenology].VegetativePhotoperiodModifier.XYPairs.X = 13.05, 16.46
              [Phenology].ReproductivePhotoperiodModifier.XYPairs.X = 13.05, 16.46
          Cultivar PioneerP9504_MG50
            Command:
              [Phenology].Vegetative.Target.FixedValue = 404
              [Phenology].EarlyFlowering.Target.FixedValue = 112
              [Phenology].EarlyGrainFilling.Target.FractionofGrainfilling.FixedValue = 0.30
              [Phenology].LateGrainFilling.Target.EntireGrainfillPeriod.FixedValue = 505
              [Phenology].VegetativePhotoperiodModifier.XYPairs.X = 12.83, 16.13
              [Phenology].ReproductivePhotoperiodModifier.XYPairs.X = 12.83, 16.13
          Cultivar AsgrowAG5701_MG50
            Command:
              [Phenology].Vegetative.Target.FixedValue = 404
              [Phenology].EarlyFlowering.Target.FixedValue = 131
              [Phenology].EarlyGrainFilling.Target.FractionofGrainfilling.FixedValue = 0.30
              [Phenology].LateGrainFilling.Target.EntireGrainfillPeriod.FixedValue = 549
              [Phenology].VegetativePhotoperiodModifier.XYPairs.X = 12.83, 16.13
              [Phenology].ReproductivePhotoperiodModifier.XYPairs.X = 12.83, 16.13
          Cultivar Hutcheson_MG50
            Command:
              [Phenology].Vegetative.Target.FixedValue = 438
              [Phenology].EarlyFlowering.Target.FixedValue = 112
              [Phenology].EarlyGrainFilling.Target.FractionofGrainfilling.FixedValue = 0.30
              [Phenology].LateGrainFilling.Target.EntireGrainfillPeriod.FixedValue = 505
              [Phenology].VegetativePhotoperiodModifier.XYPairs.X = 12.58, 15.88
              [Phenology].ReproductivePhotoperiodModifier.XYPairs.X = 12.58, 15.88
          Cultivar NK622_MG60
            Command:
              [Phenology].Vegetative.Target.FixedValue = 436
              [Phenology].EarlyFlowering.Target.FixedValue = 93
              [Phenology].EarlyGrainFilling.Target.FractionofGrainfilling.FixedValue = 0.30
              [Phenology].LateGrainFilling.Target.EntireGrainfillPeriod.FixedValue = 467
              [Phenology].VegetativePhotoperiodModifier.XYPairs.X = 12.39, 15.61
              [Phenology].ReproductivePhotoperiodModifier.XYPairs.X = 12.39, 15.61
        Folder China
          Cultivar Nandou12
            Command:
              [Phenology].Vegetative.Target.FixedValue = 500
              [Phenology].EarlyFlowering.Target.FixedValue = 120
              [Phenology].EarlyPodDevelopment.Target.FixedValue = 180
              [Phenology].EarlyGrainFilling.Target.FractionofGrainfilling.FixedValue = 0.2
              [Phenology].LateGrainFilling.Target.EntireGrainfillPeriod.FixedValue = 440
              [Phenology].VegetativePhotoperiodModifier.XYPairs.X = 12.63, 15.13
              [Phenology].ReproductivePhotoperiodModifier.XYPairs.X = 12.63, 15.13
              [Phenology].MidGrainFilling.Target.FractionofMidToLateGrainfilling.FixedValue=0.45
              [Leaf].AreaLargestLeaf.FixedValue=0.013
              [Grain].PotentialHarvestIndex.FixedValue=0.35
          Cultivar Texuan13
            Command:
              [Phenology].Vegetative.Target.FixedValue = 500
              [Phenology].EarlyFlowering.Target.FixedValue = 200
              [Phenology].EarlyPodDevelopment.Target.FixedValue = 170
              [Phenology].EarlyGrainFilling.Target.FractionofGrainfilling.FixedValue = 0.2
              [Phenology].LateGrainFilling.Target.EntireGrainfillPeriod.FixedValue = 460
              [Phenology].VegetativePhotoperiodModifier.XYPairs.X = 12.63, 15.13
              [Phenology].ReproductivePhotoperiodModifier.XYPairs.X = 12.63, 15.13
              [Phenology].MidGrainFilling.Target.FractionofMidToLateGrainfilling.FixedValue=0.45
              [Leaf].AreaLargestLeaf.FixedValue=0.013
              [Grain].PotentialHarvestIndex.FixedValue=0.35
          Cultivar Jiuyuehuang
            Command:
              [Phenology].Vegetative.Target.FixedValue = 540
              [Phenology].EarlyFlowering.Target.FixedValue = 140
              [Phenology].EarlyPodDevelopment.Target.FixedValue = 140
              [Phenology].EarlyGrainFilling.Target.FractionofGrainfilling.FixedValue = 0.2
              [Phenology].LateGrainFilling.Target.EntireGrainfillPeriod.FixedValue = 420
              [Phenology].VegetativePhotoperiodModifier.XYPairs.X = 12.94, 15.44
              [Phenology].ReproductivePhotoperiodModifier.XYPairs.X = 12.94, 15.44
              [Phenology].MidGrainFilling.Target.FractionofMidToLateGrainfilling.FixedValue=0.45
              [Leaf].AreaLargestLeaf.FixedValue=0.013
              [Grain].PotentialHarvestIndex.FixedValue=0.25
          Cultivar Hedou19
            Command:
              [Phenology].Vegetative.Target.FixedValue = 370
              [Phenology].EarlyFlowering.Target.FixedValue = 120
              [Phenology].EarlyPodDevelopment.Target.FixedValue = 180
              [Phenology].EarlyGrainFilling.Target.FractionofGrainfilling.FixedValue = 0.361
              [Phenology].LateGrainFilling.Target.EntireGrainfillPeriod.FixedValue = 600
              [Phenology].VegetativePhotoperiodModifier.XYPairs.X = 13.57, 16.07
              [Phenology].ReproductivePhotoperiodModifier.XYPairs.X = 13.57, 16.07
              [Phenology].MidGrainFilling.Target.FractionofMidToLateGrainfilling.FixedValue=0.45
              [Leaf].AreaLargestLeaf.FixedValue=0.02
              [Leaf].Phyllochron.FixedValue=45
        Folder Generic
          Cultivar Generic_MG000
            Command:
              [Phenology].Vegetative.Target.FixedValue = 310
              [Phenology].EarlyFlowering.Target.FixedValue = 100
              [Phenology].EarlyGrainFilling.Target.FractionofGrainfilling.FixedValue = 0.475
              [Phenology].LateGrainFilling.Target.EntireGrainfillPeriod.FixedValue = 590
              [Phenology].VegetativePhotoperiodModifier.XYPairs.X = 14.6, 22.35
              [Phenology].ReproductivePhotoperiodModifier.XYPairs.X = 14.6, 22.35
          Cultivar Generic_MG00
            Command:
              [Phenology].Vegetative.Target.FixedValue = 320
              [Phenology].EarlyFlowering.Target.FixedValue = 100
              [Phenology].EarlyGrainFilling.Target.FractionofGrainfilling.FixedValue = 0.467
              [Phenology].LateGrainFilling.Target.EntireGrainfillPeriod.FixedValue = 600
              [Phenology].VegetativePhotoperiodModifier.XYPairs.X = 14.35, 21.11
              [Phenology].ReproductivePhotoperiodModifier.XYPairs.X = 14.35, 21.11
          Cultivar Generic_MG0
            Command:
              [Phenology].Vegetative.Target.FixedValue = 336
              [Phenology].EarlyFlowering.Target.FixedValue = 120
              [Phenology].EarlyGrainFilling.Target.FractionofGrainfilling.FixedValue = 0.422
              [Phenology].LateGrainFilling.Target.EntireGrainfillPeriod.FixedValue = 616
              [Phenology].VegetativePhotoperiodModifier.XYPairs.X = 14.1, 19.95
              [Phenology].ReproductivePhotoperiodModifier.XYPairs.X = 14.1, 19.95
          Cultivar Generic_MG1
            Command:
              [Phenology].Vegetative.Target.FixedValue = 340
              [Phenology].EarlyFlowering.Target.FixedValue = 120
              [Phenology].EarlyGrainFilling.Target.FractionofGrainfilling.FixedValue = 0.411
              [Phenology].LateGrainFilling.Target.EntireGrainfillPeriod.FixedValue = 632
              [Phenology].VegetativePhotoperiodModifier.XYPairs.X = 13.84, 18.77
              [Phenology].ReproductivePhotoperiodModifier.XYPairs.X = 13.84, 18.77
          Cultivar Generic_MG2
            Command:
              [Phenology].Vegetative.Target.FixedValue = 348
              [Phenology].EarlyFlowering.Target.FixedValue = 120
              [Phenology].EarlyGrainFilling.Target.FractionofGrainfilling.FixedValue = 0.386
              [Phenology].LateGrainFilling.Target.EntireGrainfillPeriod.FixedValue = 648
              [Phenology].VegetativePhotoperiodModifier.XYPairs.X = 13.59, 17.61
              [Phenology].ReproductivePhotoperiodModifier.XYPairs.X = 13.59, 17.61
          Cultivar Generic_MG3
            Command:
              [Phenology].Vegetative.Target.FixedValue = 380
              [Phenology].EarlyFlowering.Target.FixedValue = 120
              [Phenology].EarlyGrainFilling.Target.FractionofGrainfilling.FixedValue = 0.361
              [Phenology].LateGrainFilling.Target.EntireGrainfillPeriod.FixedValue = 664
              [Phenology].VegetativePhotoperiodModifier.XYPairs.X = 13.4, 16.91
              [Phenology].ReproductivePhotoperiodModifier.XYPairs.X = 13.4, 16.91
          Cultivar Generic_MG4
            Command:
              [Phenology].Vegetative.Target.FixedValue = 388
              [Phenology].EarlyFlowering.Target.FixedValue = 140
              [Phenology].EarlyGrainFilling.Target.FractionofGrainfilling.FixedValue = 0.324
              [Phenology].LateGrainFilling.Target.EntireGrainfillPeriod.FixedValue = 664
              [Phenology].VegetativePhotoperiodModifier.XYPairs.X = 13.1, 16.49
              [Phenology].ReproductivePhotoperiodModifier.XYPairs.X = 13.1, 16.49
          Cultivar Generic_MG5
            Command:
              [Phenology].Vegetative.Target.FixedValue = 396
              [Phenology].EarlyFlowering.Target.FixedValue = 160
              [Phenology].EarlyGrainFilling.Target.FractionofGrainfilling.FixedValue = 0.072
              [Phenology].LateGrainFilling.Target.EntireGrainfillPeriod.FixedValue = 696
              [Phenology].VegetativePhotoperiodModifier.XYPairs.X = 12.83, 16.13
              [Phenology].ReproductivePhotoperiodModifier.XYPairs.X = 12.83, 16.13
          Cultivar Generic_MG6
            Command:
              [Phenology].Vegetative.Target.FixedValue = 404
              [Phenology].EarlyFlowering.Target.FixedValue = 180
              [Phenology].EarlyGrainFilling.Target.FractionofGrainfilling.FixedValue = 0.056
              [Phenology].LateGrainFilling.Target.EntireGrainfillPeriod.FixedValue = 712
              [Phenology].VegetativePhotoperiodModifier.XYPairs.X = 12.58, 15.8
              [Phenology].ReproductivePhotoperiodModifier.XYPairs.X = 12.58, 15.8
          Cultivar Generic_MG7
            Command:
              [Phenology].Vegetative.Target.FixedValue = 416
              [Phenology].EarlyFlowering.Target.FixedValue = 200
              [Phenology].EarlyGrainFilling.Target.FractionofGrainfilling.FixedValue = 0.055
              [Phenology].LateGrainFilling.Target.EntireGrainfillPeriod.FixedValue = 728
              [Phenology].VegetativePhotoperiodModifier.XYPairs.X = 12.33, 15.46
              [Phenology].ReproductivePhotoperiodModifier.XYPairs.X = 12.33, 15.46
          Cultivar Generic_MG8
            Command:
              [Phenology].Vegetative.Target.FixedValue = 430
              [Phenology].EarlyFlowering.Target.FixedValue = 200
              [Phenology].EarlyGrainFilling.Target.FractionofGrainfilling.FixedValue = 0.054
              [Phenology].LateGrainFilling.Target.EntireGrainfillPeriod.FixedValue = 744
              [Phenology].VegetativePhotoperiodModifier.XYPairs.X = 12.07, 15.1
              [Phenology].ReproductivePhotoperiodModifier.XYPairs.X = 12.07, 15.1
          Cultivar Generic_MG9
            Command:
              [Phenology].Vegetative.Target.FixedValue = 460
              [Phenology].EarlyFlowering.Target.FixedValue = 200
              [Phenology].EarlyGrainFilling.Target.FractionofGrainfilling.FixedValue = 0.053
              [Phenology].LateGrainFilling.Target.EntireGrainfillPeriod.FixedValue = 748
              [Phenology].VegetativePhotoperiodModifier.XYPairs.X = 11.88, 14.82
              [Phenology].ReproductivePhotoperiodModifier.XYPairs.X = 11.88, 14.82
          Cultivar Generic_MG10
            Command:
              [Phenology].Vegetative.Target.FixedValue = 470
              [Phenology].EarlyFlowering.Target.FixedValue = 200
              [Phenology].EarlyGrainFilling.Target.FractionofGrainfilling.FixedValue = 0.053
              [Phenology].LateGrainFilling.Target.EntireGrainfillPeriod.FixedValue = 748
              [Phenology].VegetativePhotoperiodModifier.XYPairs.X = 11.78, 14.65
              [Phenology].ReproductivePhotoperiodModifier.XYPairs.X = 11.78, 14.65
      Cultivar MG06_BR
        Command:
          [Phenology].Emerging.Target.ShootLag.FixedValue = 10
          [Phenology].Emerging.Target.DepthxRate.ShootRate.FixedValue = 1
  DataStore
  Simulation CR16
    Clock: Start=2015-04-01; End=2016-06-29
    Summary summaryfile
    Weather: FileName=carazinho_2016-2018.xlsx; ExcelWorkSheetName=car-2016
    SoilArbitrator Soil Arbitrator
    Zone paddock: Area=36; Slope=0; AspectAngle=0; Altitude=560
      Report HarvestReport: EventNames=[Soybean].Harvesting
        VariableNames:
          [Clock].Today
          [Soybean].AboveGround.Wt*10 as Biomass
          [Soybean].Grain.Total.Wt*10 as Yield
          [Soybean].Phenology.FloweringDAS
          [Soybean].Phenology.MaturityDAS
      Report DailyReport: EventNames=[Clock].DoReport
        VariableNames:
          [Clock].Today
          [Soybean].Phenology.Stage
          [Soybean].Phenology.CurrentStageName as Phase
          [Soybean].AboveGround.Wt*10 as Biomass
          [Soybean].LAI
          [Soybean].Grain.Total.Wt*10 as Yield
          [Soybean].DaysAfterSowing as DAS
      Fertiliser
      Soil: ASCOrder=Vertisol; SoilType=Clay; LocalName=CR; Site=Carazinho; NearestTown=Passo Fundo; Region=South; State=Rio Grande do Sul; Country=Brazil; ApsoilNumber=900; Latitude=-28; Longitude=-53
        Physical
          Thickness  ParticleSizeClay  ParticleSizeSand  ParticleSizeSilt  Rocks  BD     AirDry  LL15   DUL    SAT    KS
          100        73                9                 18                0      1.21   0.13    0.296  0.468  0.543  20
          100        73                9                 18                0      1.212  0.145   0.291  0.472  0.543  20
          100        73                9                 18                0      1.217  0.14    0.278  0.483  0.541  20
          200        73                9                 18                0      1.191  0.26    0.294  0.508  0.551  20
          300        73                9                 18                0      1.191  0.26    0.294  0.508  0.551  20
          400        73                9                 18                0      1.191  0.26    0.294  0.508  0.551  20
          300        73                9                 18                0      1.191  0.26    0.294  0.508  0.551  20
          Rocks source: Calculated
          SoilCrop SoybeanSoil: LL=[0.296, 0.291, 0.278, 0.294, 0.294, 0.294, 0.294]; KL=[0.1, 0.1, 0.06, 0.06, 0.02, 0.01, 0.01]; XF=[1, 1, 1, 1, 1, 1, 1]
        WaterBalance SoilWater: SummerDate=1-Nov; SummerU=5; SummerCona=5; WinterDate=1-Apr; WinterU=5; WinterCona=5; DiffusConst=40; DiffusSlope=16; Salb=0.12; CN2Bare=81; CNRed=20; CNCov=0.8; PSIDul=-100; Thickness=[150, 150, 300, 300, 300, 300, 300]; SWCON=[0.3, 0.3, 0.3, 0.3, 0.3, 0.3, 0.3]
        Organic: FOMCNRatio=40; CarbonUnits=Total
          Thickness  Carbon  SoilCNRatio  FBiom  FInert  FOM
          300        1.2     12           0.04   0.4     347.129
          200        0.96    12           0.02   0.6     270.344
          200        0.6     12           0.02   0.8     163.972
          200        0.3     12           0.02   1       99.454
          300        0.18    12           0.01   1       60.322
          300        0.12    12           0.01   1       36.587
        Chemical: Thickness=[100, 100, 200]; PH=[5.5, 5.5, 5.5]; PHUnits=Water
        Water: Thickness=[100, 100, 100, 200, 300, 400, 300]; InitialValues=[0.399, 0.4, 0.401, 0.422, 0.422, 0.422, 0.422]; InitialPAWmm=187.1; RelativeTo=Soybean; FilledFromTop=false
        CERESSoilTemperature Temperature
        Nutrient
        Solute NO3: Thickness=[100, 100, 200]; InitialValues=[1, 1, 1]; InitialValuesUnits=ppm; WaterTableConcentration=0; D0=0; DepthConstant=0; MaxDepthSoluteAccessible=0; RunoffEffectivenessAtMovingSolute=0; MaxEffectiveRunoff=0
        Solute NH4: Thickness=[100, 100, 200]; InitialValues=[0.1, 0.1, 0.1]; InitialValuesUnits=ppm; WaterTableConcentration=0; D0=0; DepthConstant=0; MaxDepthSoluteAccessible=0; RunoffEffectivenessAtMovingSolute=0; MaxEffectiveRunoff=0
        Solute Urea: Thickness=[100, 100, 200]; InitialValues=[0, 0, 0]; InitialValuesUnits=kg/ha; WaterTableConcentration=0; D0=0; DepthConstant=0; MaxDepthSoluteAccessible=0; RunoffEffectivenessAtMovingSolute=0; MaxEffectiveRunoff=0
      SurfaceOrganicMatter: InitialResidueName=wheat; InitialResidueType=wheat; InitialResidueMass=100; InitialStandingFraction=0; InitialCPR=0; InitialCNR=55
      Plant Soybean
      MicroClimate: a_interception=0; b_interception=1; c_interception=0; d_interception=0; SoilHeatFluxFraction=0.4; MinimumHeightDiffForNewLayer=0; NightInterceptionFraction=0.5; ReferenceHeight=2
      Manager SowingFertiliser
        Amount = 0
        CropName = soybean
```csharp
using Models.Soils;
using System.Linq;
using System;
using Models.Core;
using Models.PMF;
namespace Models
{
    [Serializable]
    public class Script : Model
    {
        [Link] Clock Clock;
        [Link] Fertiliser Fertiliser;
        [Link] Summary Summary;
        
        
        [Description("Amount of fertiliser to be applied (kg/ha)")]
        public double Amount { get; set;}
        
        [Description("Crop to be fertilised")]
        public string CropName { get; set;}
        
        
        

        [EventSubscribe("Sowing")]
        private void OnSowing(object sender, EventArgs e)
        {
            Model crop = sender as Model;
            if (crop.Name.ToLower()==CropName.ToLower())
                Fertiliser.Apply(Amount: Amount, Type: Fertiliser.Types.NO3N);
        }
        
    }
}
```
      Manager Harvesting
```csharp
using Models.PMF.Phen;
using APSIM.Shared.Utilities;
using System.Xml.Serialization;
using Models;
using Models.PMF;
using Models.Soils;
using System.Text;
using System.Collections.Generic;
using Models.Core;
using System;
using System.Linq;
using Models.Soils.Nutrients;

namespace Models
{
    [Serializable] 
    public class Script : Model
    {
        [Link] private Plant Soybean;
        [Link] private Zone zone;
        [Link(Type = LinkType.Path, Path = "[Soybean].Phenology")]
        private Phenology phenology;
                    
        
        [EventSubscribe("StartOfSimulation")]
        private void OnSimulationCommencing(object sender, EventArgs e)
        {
        }
        
        [EventSubscribe("DoManagement")]
        private void OnDoManagement(object sender, EventArgs e)
        {
            if (phenology.CurrentPhase.Name == "ReadyForHarvesting")
            {
                Soybean.Harvest();
                Soybean.EndCrop();
            }
        }
        
        [EventSubscribe("DoManagementCalculations")]
        private void OnDoManagementCalculations(object sender, EventArgs e)
        {
            
        }
    }
}
```
      Manager Sow on a fixed date
        Crop = [Soybean]
        SowDate = 16-nov
        CultivarName = Generic_MG6
        SowingDepth = 50
        RowSpacing = 450
        Population = 28
```csharp
using APSIM.Shared.Utilities;
using Models.Utilities;
using Models.Soils;
using Models.PMF;
using Models.Core;
using System;

namespace Models
{
    [Serializable]
    public class Script : Model
    {
        [Link] Clock Clock;
        [Link] Fertiliser Fertiliser;
        [Link] Summary Summary;
        [Link] Soil Soil;
        
        [Description("Crop")]
        public IPlant Crop { get; set; }

        [Description("Sowing date (d-mmm)")]
        public string SowDate { get; set; }

        [Display(Type = DisplayType.CultivarName)]
        [Description("Cultivar to be sown")]
        public string CultivarName { get; set; }

        [Description("Sowing depth (mm)")]
        public double SowingDepth { get; set; }

        [Description("Row spacing (mm)")]
        public double RowSpacing { get; set; }

        [Description("Plant population (/m2)")]
        public double Population { get; set; }

        [EventSubscribe("DoManagement")]
        private void OnDoManagement(object sender, EventArgs e)
        {
            if (DateUtilities.WithinDates(SowDate, Clock.Today, SowDate))
            {
                Crop.Sow(population: Population, cultivar: CultivarName, depth: SowingDepth, rowSpacing: RowSpacing);    
            }
        }
    }
}
```
  Simulation CR17
    Clock: Start=2016-04-01; End=2017-06-30
    Summary summaryfile
    Weather: FileName=carazinho_2016-2018.xlsx; ExcelWorkSheetName=car-2017
    SoilArbitrator Soil Arbitrator
    Zone paddock: Area=36; Slope=0; AspectAngle=0; Altitude=560
      Report HarvestReport: EventNames=[Soybean].Harvesting
        VariableNames:
          [Clock].Today
          [Soybean].AboveGround.Wt*10 as Biomass
          [Soybean].Grain.Total.Wt*10 as Yield
          [Soybean].Phenology.FloweringDAS
          [Soybean].Phenology.MaturityDAS
      Report DailyReport: EventNames=[Clock].DoReport
        VariableNames:
          [Clock].Today
          [Soybean].Phenology.Stage
          [Soybean].Phenology.CurrentStageName as Phase
          [Soybean].AboveGround.Wt*10 as Biomass
          [Soybean].LAI
          [Soybean].Grain.Total.Wt*10 as Yield
          [Soybean].DaysAfterSowing as DAS
      Fertiliser
      Soil: ASCOrder=Vertosol; ASCSubOrder=Black; SoilType=Black Vertosol; Site=Carazinho; NearestTown=Passo Fundo; State=Rio Grande do Sul; Country=Brazil; ApsoilNumber=900; Latitude=-28; Longitude=-53
        Physical: same as CR16.paddock.Soil.Physical
        WaterBalance SoilWater: same as CR16.paddock.Soil.SoilWater
        Organic: FOMCNRatio=40; CarbonUnits=Total
          Thickness  Carbon  SoilCNRatio  FBiom  FInert  FOM
          300        1.16    12           0.04   0.4     347.129
          200        0.96    12           0.02   0.6     270.344
          200        0.6     12           0.02   0.8     163.972
          200        0.3     12           0.02   1       99.454
          300        0.18    12           0.01   1       60.322
          300        0.12    12           0.01   1       36.587
        Chemical: Thickness=[100, 100, 200]; PH=[5.3, 5.3, 5.3]; PHUnits=Water
        Water: Thickness=[100, 100, 100, 200, 300, 400, 300]; InitialValues=[0.399, 0.4, 0.401, 0.422, 0.422, 0.422, 0.422]; InitialPAWmm=187.1; RelativeTo=Soybean; FilledFromTop=false
        CERESSoilTemperature Temperature
        Nutrient
        Solute NO3: Thickness=[100, 100, 200]; InitialValues=[1, 1, 1]; InitialValuesUnits=ppm; WaterTableConcentration=0; D0=0; DepthConstant=0; MaxDepthSoluteAccessible=0; RunoffEffectivenessAtMovingSolute=0; MaxEffectiveRunoff=0
        Solute NH4: Thickness=[100, 100, 200]; InitialValues=[0.1, 0.1, 0.1]; InitialValuesUnits=ppm; WaterTableConcentration=0; D0=0; DepthConstant=0; MaxDepthSoluteAccessible=0; RunoffEffectivenessAtMovingSolute=0; MaxEffectiveRunoff=0
        Solute Urea: Thickness=[100, 100, 200]; InitialValues=[0, 0, 0]; InitialValuesUnits=kg/ha; WaterTableConcentration=0; D0=0; DepthConstant=0; MaxDepthSoluteAccessible=0; RunoffEffectivenessAtMovingSolute=0; MaxEffectiveRunoff=0
      SurfaceOrganicMatter: InitialResidueName=wheat; InitialResidueType=wheat; InitialResidueMass=100; InitialStandingFraction=0; InitialCPR=0; InitialCNR=55
      Plant Soybean
      MicroClimate: a_interception=0; b_interception=1; c_interception=0; d_interception=0; SoilHeatFluxFraction=0.4; MinimumHeightDiffForNewLayer=0; NightInterceptionFraction=0.5; ReferenceHeight=2
      Manager SowingFertiliser: same as CR16.paddock.SowingFertiliser
      Manager Harvesting: same as CR16.paddock.Harvesting
      Manager Sow on a fixed date
        Crop = [Soybean]
        SowDate = 8-nov
        CultivarName = Generic_MG6
        SowingDepth = 50
        RowSpacing = 450
        Population = 28
        script: same as in CR16.paddock.Sow on a fixed date
  Simulation CR18
    Clock: Start=2017-08-01; End=2018-06-30
    Summary summaryfile
    Weather: FileName=carazinho_2016-2018.xlsx; ExcelWorkSheetName=car-2018
    SoilArbitrator Soil Arbitrator
    Zone paddock: Area=36; Slope=0; AspectAngle=0; Altitude=560
      Report HarvestReport: EventNames=[Soybean].Harvesting
        VariableNames:
          [Clock].Today
          [Soybean].AboveGround.Wt*10 as Biomass
          [Soybean].Grain.Total.Wt*10 as Yield
          [Soybean].Phenology.FloweringDAS
          [Soybean].Phenology.MaturityDAS
      Report DailyReport: EventNames=[Clock].DoReport
        VariableNames:
          [Clock].Today
          [Soybean].Phenology.Stage
          [Soybean].Phenology.CurrentStageName as Phase
          [Soybean].AboveGround.Wt*10 as Biomass
          [Soybean].LAI
          [Soybean].Grain.Total.Wt*10 as Yield
          [Soybean].DaysAfterSowing as DAS
      Fertiliser
      Soil: same as CR16.paddock.Soil
      SurfaceOrganicMatter: InitialResidueName=wheat; InitialResidueType=wheat; InitialResidueMass=100; InitialStandingFraction=0; InitialCPR=0; InitialCNR=55
      Plant Soybean
      MicroClimate: a_interception=0; b_interception=1; c_interception=0; d_interception=0; SoilHeatFluxFraction=0.4; MinimumHeightDiffForNewLayer=0; NightInterceptionFraction=0.5; ReferenceHeight=2
      Manager SowingFertiliser: same as CR16.paddock.SowingFertiliser
      Manager Harvesting: same as CR16.paddock.Harvesting
      Manager Sow on a fixed date
        Crop = [Soybean]
        SowDate = 13-nov
        CultivarName = Generic_MG6
        SowingDepth = 50
        RowSpacing = 450
        Population = 28
        script: same as in CR16.paddock.Sow on a fixed date
  Simulation FW14a
    Clock: Start=2013-04-01; End=2014-06-30
    Summary summaryfile
    Weather: FileName=frederico_2014.xlsx; ExcelWorkSheetName=frederico
    SoilArbitrator Soil Arbitrator
    Zone P1: Area=2; Slope=0; AspectAngle=0; Altitude=522
      Report HarvestReport: EventNames=[Soybean].Harvesting
        VariableNames:
          [Clock].Today
          [Soybean].AboveGround.Wt*10 as Biomass
          [Soybean].Grain.Total.Wt*10 as Yield
          [Soybean].Phenology.FloweringDAS
          [Soybean].Phenology.MaturityDAS
      Report DailyReport: EventNames=[Clock].DoReport
        VariableNames:
          [Clock].Today
          [Soybean].Phenology.Stage
          [Soybean].Phenology.CurrentStageName as Phase
          [Soybean].AboveGround.Wt*10 as Biomass
          [Soybean].LAI
          [Soybean].Grain.Total.Wt*10 as Yield
          [Soybean].DaysAfterSowing as DAS
      Fertiliser
      Soil: ASCOrder=Vertosol; ASCSubOrder=Black; SoilType=Black Vertosol; Site=Frederico W.; NearestTown=Passo Fundo; State=Rio Grande do Sul; Country=Brazil; ApsoilNumber=900; Latitude=-28; Longitude=-53
        Physical
          Thickness  ParticleSizeClay  ParticleSizeSand  ParticleSizeSilt  Rocks  BD     AirDry  LL15   DUL    SAT    KS
          100        66                15                19                0      1.21   0.13    0.296  0.468  0.543  20
          100        66                15                19                0      1.212  0.145   0.291  0.472  0.543  20
          100        66                15                19                0      1.217  0.14    0.278  0.483  0.541  20
          200        66                15                19                0      1.191  0.26    0.294  0.508  0.551  20
          300        66                15                19                0      1.191  0.26    0.294  0.508  0.551  20
          400        66                15                19                0      1.191  0.26    0.294  0.508  0.551  20
          300        66                15                19                0      1.191  0.26    0.294  0.508  0.551  20
          Rocks source: Calculated
          SoilCrop SoybeanSoil: LL=[0.296, 0.291, 0.278, 0.294, 0.294, 0.392, 0.392]; KL=[0.1, 0.1, 0.06, 0.06, 0.02, 0.01, 0.01]; XF=[1, 1, 1, 1, 1, 1, 1]
        WaterBalance SoilWater: same as CR16.paddock.Soil.SoilWater
        Organic: same as CR17.paddock.Soil.Organic
        Chemical: Thickness=[150, 150, 200]; PH=[5.3, 5.3, 5.3]; PHUnits=Water
        Water: Thickness=[100, 100, 100, 200, 300, 400, 300]; InitialValues=[0.399, 0.4, 0.401, 0.422, 0.422, 0.462, 0.462]; InitialPAWmm=146.5; RelativeTo=Soybean; FilledFromTop=false
        CERESSoilTemperature Temperature
        Nutrient
        Solute NO3: Thickness=[150, 150, 200]; InitialValues=[1, 1, 1]; InitialValuesUnits=ppm; WaterTableConcentration=0; D0=0; DepthConstant=0; MaxDepthSoluteAccessible=0; RunoffEffectivenessAtMovingSolute=0; MaxEffectiveRunoff=0
        Solute NH4: Thickness=[150, 150, 200]; InitialValues=[0.1, 0.1, 0.1]; InitialValuesUnits=ppm; WaterTableConcentration=0; D0=0; DepthConstant=0; MaxDepthSoluteAccessible=0; RunoffEffectivenessAtMovingSolute=0; MaxEffectiveRunoff=0
        Solute Urea: Thickness=[150, 150, 200]; InitialValues=[0, 0, 0]; InitialValuesUnits=kg/ha; WaterTableConcentration=0; D0=0; DepthConstant=0; MaxDepthSoluteAccessible=0; RunoffEffectivenessAtMovingSolute=0; MaxEffectiveRunoff=0
      SurfaceOrganicMatter: InitialResidueName=wheat; InitialResidueType=wheat; InitialResidueMass=100; InitialStandingFraction=0; InitialCPR=0; InitialCNR=55
      Plant Soybean
      MicroClimate: a_interception=0; b_interception=1; c_interception=0; d_interception=0; SoilHeatFluxFraction=0.4; MinimumHeightDiffForNewLayer=0; NightInterceptionFraction=0.5; ReferenceHeight=2
      Manager SowingFertiliser: same as CR16.paddock.SowingFertiliser
      Manager Harvesting: same as CR16.paddock.Harvesting
      Manager Sow on a fixed date
        Crop = [Soybean]
        SowDate = 01-oct
        CultivarName = Generic_MG6
        SowingDepth = 50
        RowSpacing = 450
        Population = 28
        script: same as in CR16.paddock.Sow on a fixed date
  Simulation FW14b
    Clock: Start=2013-04-01; End=2014-06-30
    Summary summaryfile
    Weather: FileName=frederico_2014.xlsx; ExcelWorkSheetName=frederico
    SoilArbitrator Soil Arbitrator
    Zone P2: Area=2; Slope=0; AspectAngle=0; Altitude=522
      Report HarvestReport: EventNames=[Soybean].Harvesting
        VariableNames:
          [Clock].Today
          [Soybean].AboveGround.Wt*10 as Biomass
          [Soybean].Grain.Total.Wt*10 as Yield
          [Soybean].Phenology.FloweringDAS
          [Soybean].Phenology.MaturityDAS
      Report DailyReport: EventNames=[Clock].DoReport
        VariableNames:
          [Clock].Today
          [Soybean].Phenology.Stage
          [Soybean].Phenology.CurrentStageName as Phase
          [Soybean].AboveGround.Wt*10 as Biomass
          [Soybean].LAI
          [Soybean].Grain.Total.Wt*10 as Yield
          [Soybean].DaysAfterSowing as DAS
      Fertiliser
      Soil: same as FW14a.P1.Soil
      SurfaceOrganicMatter: InitialResidueName=wheat; InitialResidueType=wheat; InitialResidueMass=100; InitialStandingFraction=0; InitialCPR=0; InitialCNR=55
      Plant Soybean
      MicroClimate: a_interception=0; b_interception=1; c_interception=0; d_interception=0; SoilHeatFluxFraction=0.4; MinimumHeightDiffForNewLayer=0; NightInterceptionFraction=0.5; ReferenceHeight=2
      Manager SowingFertiliser: same as CR16.paddock.SowingFertiliser
      Manager Harvesting: same as CR16.paddock.Harvesting
      Manager Sow on a fixed date
        Crop = [Soybean]
        SowDate = 18-oct
        CultivarName = Generic_MG6
        SowingDepth = 50
        RowSpacing = 450
        Population = 28
        script: same as in CR16.paddock.Sow on a fixed date
  Simulation FW14c
    Clock: Start=2013-04-01; End=2014-06-30
    Summary summaryfile
    Weather: FileName=frederico_2014.xlsx; ExcelWorkSheetName=frederico
    SoilArbitrator Soil Arbitrator
    Zone P3: Area=2; Slope=0; AspectAngle=0; Altitude=522
      Report HarvestReport: EventNames=[Soybean].Harvesting
        VariableNames:
          [Clock].Today
          [Soybean].AboveGround.Wt*10 as Biomass
          [Soybean].Grain.Total.Wt*10 as Yield
          [Soybean].Phenology.FloweringDAS
          [Soybean].Phenology.MaturityDAS
      Report DailyReport: EventNames=[Clock].DoReport
        VariableNames:
          [Clock].Today
          [Soybean].Phenology.Stage
          [Soybean].Phenology.CurrentStageName as Phase
          [Soybean].AboveGround.Wt*10 as Biomass
          [Soybean].LAI
          [Soybean].Grain.Total.Wt*10 as Yield
          [Soybean].DaysAfterSowing as DAS
      Fertiliser
      Soil: same as FW14a.P1.Soil
      SurfaceOrganicMatter: InitialResidueName=wheat; InitialResidueType=wheat; InitialResidueMass=100; InitialStandingFraction=0; InitialCPR=0; InitialCNR=55
      Plant Soybean
      MicroClimate: a_interception=0; b_interception=1; c_interception=0; d_interception=0; SoilHeatFluxFraction=0.4; MinimumHeightDiffForNewLayer=0; NightInterceptionFraction=0.5; ReferenceHeight=2
      Manager SowingFertiliser: same as CR16.paddock.SowingFertiliser
      Manager Harvesting: same as CR16.paddock.Harvesting
      Manager Sow on a fixed date
        Crop = [Soybean]
        SowDate = 08-nov
        CultivarName = Generic_MG6
        SowingDepth = 50
        RowSpacing = 450
        Population = 28
        script: same as in CR16.paddock.Sow on a fixed date
  Simulation FW14d
    Clock: Start=2013-04-01; End=2014-06-30
    Summary summaryfile
    Weather: FileName=frederico_2014.xlsx; ExcelWorkSheetName=frederico
    SoilArbitrator Soil Arbitrator
    Zone FW14d: Area=2; Slope=0; AspectAngle=0; Altitude=522
      Report HarvestReport: EventNames=[Soybean].Harvesting
        VariableNames:
          [Clock].Today
          [Soybean].AboveGround.Wt*10 as Biomass
          [Soybean].Grain.Total.Wt*10 as Yield
          [Soybean].Phenology.FloweringDAS
          [Soybean].Phenology.MaturityDAS
      Report DailyReport: EventNames=[Clock].DoReport
        VariableNames:
          [Clock].Today
          [Soybean].Phenology.Stage
          [Soybean].Phenology.CurrentStageName as Phase
          [Soybean].AboveGround.Wt*10 as Biomass
          [Soybean].LAI
          [Soybean].Grain.Total.Wt*10 as Yield
          [Soybean].DaysAfterSowing as DAS
      Fertiliser
      Soil: same as FW14a.P1.Soil
      SurfaceOrganicMatter: InitialResidueName=wheat; InitialResidueType=wheat; InitialResidueMass=100; InitialStandingFraction=0; InitialCPR=0; InitialCNR=55
      Plant Soybean
      MicroClimate: a_interception=0; b_interception=1; c_interception=0; d_interception=0; SoilHeatFluxFraction=0.4; MinimumHeightDiffForNewLayer=0; NightInterceptionFraction=0.5; ReferenceHeight=2
      Manager SowingFertiliser: same as CR16.paddock.SowingFertiliser
      Manager Harvesting: same as CR16.paddock.Harvesting
      Manager Sow on a fixed date
        Crop = [Soybean]
        SowDate = 25-Nov
        CultivarName = Generic_MG6
        SowingDepth = 50
        RowSpacing = 450
        Population = 28
        script: same as in CR16.paddock.Sow on a fixed date
  Simulation FW14e
    Clock: Start=2013-04-01; End=2014-06-30
    Summary summaryfile
    Weather: FileName=frederico_2014.xlsx; ExcelWorkSheetName=frederico
    SoilArbitrator Soil Arbitrator
    Zone FW14e: Area=2; Slope=0; AspectAngle=0; Altitude=522
      Report HarvestReport: EventNames=[Soybean].Harvesting
        VariableNames:
          [Clock].Today
          [Soybean].AboveGround.Wt*10 as Biomass
          [Soybean].Grain.Total.Wt*10 as Yield
          [Soybean].Phenology.FloweringDAS
          [Soybean].Phenology.MaturityDAS
      Report DailyReport: EventNames=[Clock].DoReport
        VariableNames:
          [Clock].Today
          [Soybean].Phenology.Stage
          [Soybean].Phenology.CurrentStageName as Phase
          [Soybean].AboveGround.Wt*10 as Biomass
          [Soybean].LAI
          [Soybean].Grain.Total.Wt*10 as Yield
          [Soybean].DaysAfterSowing as DAS
      Fertiliser
      Soil: same as FW14a.P1.Soil
      SurfaceOrganicMatter: InitialResidueName=wheat; InitialResidueType=wheat; InitialResidueMass=100; InitialStandingFraction=0; InitialCPR=0; InitialCNR=55
      Plant Soybean
      MicroClimate: a_interception=0; b_interception=1; c_interception=0; d_interception=0; SoilHeatFluxFraction=0.4; MinimumHeightDiffForNewLayer=0; NightInterceptionFraction=0.5; ReferenceHeight=2
      Manager SowingFertiliser: same as CR16.paddock.SowingFertiliser
      Manager Harvesting: same as CR16.paddock.Harvesting
      Manager Sow on a fixed date
        Crop = [Soybean]
        SowDate = 15-dec
        CultivarName = Generic_MG6
        SowingDepth = 50
        RowSpacing = 450
        Population = 28
        script: same as in CR16.paddock.Sow on a fixed date
  Simulation PI14a
    Clock: Start=2013-04-01; End=2014-06-30
    Summary summaryfile
    Weather: FileName=piracicaba_2014.xlsx; ExcelWorkSheetName=piracicaba
    SoilArbitrator Soil Arbitrator
    Zone P12: Area=2; Slope=0; AspectAngle=0; Altitude=522
      Report HarvestReport: EventNames=[Soybean].Harvesting
        VariableNames:
          [Clock].Today
          [Soybean].AboveGround.Wt*10 as Biomass
          [Soybean].Grain.Total.Wt*10 as Yield
          [Soybean].Phenology.FloweringDAS
          [Soybean].Phenology.MaturityDAS
      Report DailyReport: EventNames=[Clock].DoReport
        VariableNames:
          [Clock].Today
          [Soybean].Phenology.Stage
          [Soybean].Phenology.CurrentStageName as Phase
          [Soybean].AboveGround.Wt*10 as Biomass
          [Soybean].LAI
          [Soybean].Grain.Total.Wt*10 as Yield
          [Soybean].DaysAfterSowing as DAS
      Fertiliser
      Soil: ASCOrder=Oxisol; ASCSubOrder=Black; SoilType=Clay; Site=Piracicaba; State=Sao Paulo; Country=Brazil; ApsoilNumber=900; Latitude=-22.72; Longitude=-47.63
        Physical
          Thickness  ParticleSizeClay  ParticleSizeSand  ParticleSizeSilt  Rocks  BD     AirDry  LL15  DUL    SAT    KS
          100        65                22                13                0      1.358  0.13    0.2   0.425  0.488  20
          100        65                22                13                0      1.373  0.19    0.2   0.425  0.481  20
          100        65                22                13                0      1.409  0.19    0.2   0.426  0.468  20
          200        65                22                13                0      1.522  0.21    0.22  0.41   0.426  20
          300        65                22                13                0      1.522  0.21    0.22  0.41   0.426  20
          400        65                22                13                0      1.522  0.21    0.22  0.41   0.426  20
          300        65                22                13                0      1.522  0.21    0.22  0.41   0.426  20
          Rocks source: Calculated
          SoilCrop SoybeanSoil: LL=[0.2, 0.2, 0.2, 0.28, 0.28, 0.28, 0.28]; KL=[0.1, 0.1, 0.06, 0.06, 0.02, 0.01, 0.01]; XF=[1, 1, 1, 1, 1, 1, 1]
            XF source: Calculated (layer 4, 5)
        WaterBalance SoilWater: same as CR16.paddock.Soil.SoilWater
        Organic: same as CR17.paddock.Soil.Organic
        Chemical: Thickness=[150, 150, 200]; PH=[5.35, 5.35, 5.35]; PHUnits=Water
        Water: Thickness=[100, 100, 100, 200, 300, 400, 300]; InitialValues=[0.335, 0.335, 0.336, 0.358, 0.358, 0.358, 0.358]; InitialPAWmm=134.2; RelativeTo=Soybean; FilledFromTop=false
        CERESSoilTemperature Temperature
        Nutrient
        Solute NO3: Thickness=[150, 150, 200]; InitialValues=[1, 1, 1]; InitialValuesUnits=ppm; WaterTableConcentration=0; D0=0; DepthConstant=0; MaxDepthSoluteAccessible=0; RunoffEffectivenessAtMovingSolute=0; MaxEffectiveRunoff=0
        Solute NH4: Thickness=[150, 150, 200]; InitialValues=[0.1, 0.1, 0.1]; InitialValuesUnits=ppm; WaterTableConcentration=0; D0=0; DepthConstant=0; MaxDepthSoluteAccessible=0; RunoffEffectivenessAtMovingSolute=0; MaxEffectiveRunoff=0
        Solute Urea: Thickness=[150, 150, 200]; InitialValues=[0, 0, 0]; InitialValuesUnits=kg/ha; WaterTableConcentration=0; D0=0; DepthConstant=0; MaxDepthSoluteAccessible=0; RunoffEffectivenessAtMovingSolute=0; MaxEffectiveRunoff=0
      SurfaceOrganicMatter: InitialResidueName=wheat; InitialResidueType=wheat; InitialResidueMass=100; InitialStandingFraction=0; InitialCPR=0; InitialCNR=55
      Plant Soybean
      MicroClimate: a_interception=0; b_interception=1; c_interception=0; d_interception=0; SoilHeatFluxFraction=0.4; MinimumHeightDiffForNewLayer=0; NightInterceptionFraction=0.5; ReferenceHeight=2
      Manager SowingFertiliser: same as CR16.paddock.SowingFertiliser
      Manager Harvesting: same as CR16.paddock.Harvesting
      Manager Sow on a fixed date
        Crop = [Soybean]
        SowDate = 18-oct
        CultivarName = Generic_MG6
        SowingDepth = 50
        RowSpacing = 500
        Population = 38
        script: same as in CR16.paddock.Sow on a fixed date
  Simulation PI14b
    Clock: Start=2013-04-01; End=2014-06-30
    Summary summaryfile
    Weather: FileName=piracicaba_2014.xlsx; ExcelWorkSheetName=Irri13
    SoilArbitrator Soil Arbitrator
    Zone P13: Area=2; Slope=0; AspectAngle=0; Altitude=522
      Report HarvestReport: EventNames=[Soybean].Harvesting
        VariableNames:
          [Clock].Today
          [Soybean].AboveGround.Wt*10 as Biomass
          [Soybean].Grain.Total.Wt*10 as Yield
          [Soybean].Phenology.FloweringDAS
          [Soybean].Phenology.MaturityDAS
      Report DailyReport: EventNames=[Clock].DoReport
        VariableNames:
          [Clock].Today
          [Soybean].Phenology.Stage
          [Soybean].Phenology.CurrentStageName as Phase
          [Soybean].AboveGround.Wt*10 as Biomass
          [Soybean].LAI
          [Soybean].Grain.Total.Wt*10 as Yield
          [Soybean].DaysAfterSowing as DAS
      Fertiliser
      Soil: ASCOrder=Oxisol; ASCSubOrder=Black; SoilType=Clay; Site=Piracicaba; State=Sao Paulo; Country=Brazil; ApsoilNumber=900; Latitude=-22.72; Longitude=-47.63
        Physical
          Thickness  ParticleSizeClay  ParticleSizeSand  ParticleSizeSilt  Rocks  BD     AirDry  LL15  DUL    SAT    KS
          100        65                22                13                0      1.358  0.13    0.2   0.425  0.488  20
          100        65                22                13                0      1.373  0.19    0.2   0.425  0.481  20
          100        65                22                13                0      1.409  0.19    0.2   0.426  0.468  20
          200        65                22                13                0      1.522  0.21    0.22  0.41   0.426  20
          300        65                22                13                0      1.522  0.21    0.22  0.41   0.426  20
          400        65                22                13                0      1.522  0.21    0.22  0.41   0.426  20
          300        65                22                13                0      1.522  0.21    0.22  0.41   0.426  20
          Rocks source: Calculated
          SoilCrop SoybeanSoil: LL=[0.2, 0.2, 0.2, 0.22, 0.22, 0.22, 0.22]; KL=[0.1, 0.1, 0.06, 0.06, 0.02, 0.01, 0.01]; XF=[1, 1, 1, 1, 1, 1, 1]
            LL, XF source: Calculated (layer 4, 5)
        WaterBalance SoilWater: same as CR16.paddock.Soil.SoilWater
        Organic: same as CR17.paddock.Soil.Organic
        Chemical: Thickness=[150, 150, 200]; PH=[5.35, 5.35, 5.35]; PHUnits=Water
        Water: Thickness=[100, 100, 100, 200, 300, 400, 300]; InitialValues=[0.335, 0.335, 0.336, 0.334, 0.334, 0.334, 0.334]; InitialPAWmm=177.4; RelativeTo=Soybean; FilledFromTop=false
        CERESSoilTemperature Temperature
        Nutrient
        Solute NO3: Thickness=[150, 150, 200]; InitialValues=[1, 1, 1]; InitialValuesUnits=ppm; WaterTableConcentration=0; D0=0; DepthConstant=0; MaxDepthSoluteAccessible=0; RunoffEffectivenessAtMovingSolute=0; MaxEffectiveRunoff=0
        Solute NH4: Thickness=[150, 150, 200]; InitialValues=[0.1, 0.1, 0.1]; InitialValuesUnits=ppm; WaterTableConcentration=0; D0=0; DepthConstant=0; MaxDepthSoluteAccessible=0; RunoffEffectivenessAtMovingSolute=0; MaxEffectiveRunoff=0
        Solute Urea: Thickness=[150, 150, 200]; InitialValues=[0, 0, 0]; InitialValuesUnits=kg/ha; WaterTableConcentration=0; D0=0; DepthConstant=0; MaxDepthSoluteAccessible=0; RunoffEffectivenessAtMovingSolute=0; MaxEffectiveRunoff=0
      SurfaceOrganicMatter: InitialResidueName=wheat; InitialResidueType=wheat; InitialResidueMass=100; InitialStandingFraction=0; InitialCPR=0; InitialCNR=55
      Plant Soybean
      MicroClimate: a_interception=0; b_interception=1; c_interception=0; d_interception=0; SoilHeatFluxFraction=0.4; MinimumHeightDiffForNewLayer=0; NightInterceptionFraction=0.5; ReferenceHeight=2
      Manager SowingFertiliser: same as CR16.paddock.SowingFertiliser
      Manager Harvesting: same as CR16.paddock.Harvesting
      Manager Sow on a fixed date
        Crop = [Soybean]
        SowDate = 18-oct
        CultivarName = Generic_MG6
        SowingDepth = 50
        RowSpacing = 500
        Population = 37
        script: same as in CR16.paddock.Sow on a fixed date
  Simulation PI14c
    Clock: Start=2013-04-01; End=2014-06-30
    Summary summaryfile
    Weather: FileName=piracicaba_2014.xlsx; ExcelWorkSheetName=piracicaba
    SoilArbitrator Soil Arbitrator
    Zone P14: Area=2; Slope=0; AspectAngle=0; Altitude=522
      Report HarvestReport: EventNames=[Soybean].Harvesting
        VariableNames:
          [Clock].Today
          [Soybean].AboveGround.Wt*10 as Biomass
          [Soybean].Grain.Total.Wt*10 as Yield
          [Soybean].Phenology.FloweringDAS
          [Soybean].Phenology.MaturityDAS
      Report DailyReport: EventNames=[Clock].DoReport
        VariableNames:
          [Clock].Today
          [Soybean].Phenology.Stage
          [Soybean].Phenology.CurrentStageName as Phase
          [Soybean].AboveGround.Wt*10 as Biomass
          [Soybean].LAI
          [Soybean].Grain.Total.Wt*10 as Yield
          [Soybean].DaysAfterSowing as DAS
      Fertiliser
      Soil: same as PI14b.P13.Soil
      SurfaceOrganicMatter: InitialResidueName=wheat; InitialResidueType=wheat; InitialResidueMass=100; InitialStandingFraction=0; InitialCPR=0; InitialCNR=55
      Plant Soybean
      MicroClimate: a_interception=0; b_interception=1; c_interception=0; d_interception=0; SoilHeatFluxFraction=0.4; MinimumHeightDiffForNewLayer=0; NightInterceptionFraction=0.5; ReferenceHeight=2
      Manager SowingFertiliser: same as CR16.paddock.SowingFertiliser
      Manager Harvesting: same as CR16.paddock.Harvesting
      Manager Sow on a fixed date
        Crop = [Soybean]
        SowDate = 14-nov
        CultivarName = Generic_MG6
        SowingDepth = 50
        RowSpacing = 500
        Population = 22
        script: same as in CR16.paddock.Sow on a fixed date
  Simulation PI14d
    Clock: Start=2013-04-01; End=2014-06-30
    Summary summaryfile
    Weather: FileName=piracicaba_2014.xlsx; ExcelWorkSheetName=Irri15
    SoilArbitrator Soil Arbitrator
    Zone P15: Area=2; Slope=0; AspectAngle=0; Altitude=522
      Report HarvestReport: EventNames=[Soybean].Harvesting
        VariableNames:
          [Clock].Today
          [Soybean].AboveGround.Wt*10 as Biomass
          [Soybean].Grain.Total.Wt*10 as Yield
          [Soybean].Phenology.FloweringDAS
          [Soybean].Phenology.MaturityDAS
      Report DailyReport: EventNames=[Clock].DoReport
        VariableNames:
          [Clock].Today
          [Soybean].Phenology.Stage
          [Soybean].Phenology.CurrentStageName as Phase
          [Soybean].AboveGround.Wt*10 as Biomass
          [Soybean].LAI
          [Soybean].Grain.Total.Wt*10 as Yield
          [Soybean].DaysAfterSowing as DAS
      Fertiliser
      Soil: same as PI14b.P13.Soil
      SurfaceOrganicMatter: InitialResidueName=wheat; InitialResidueType=wheat; InitialResidueMass=100; InitialStandingFraction=0; InitialCPR=0; InitialCNR=55
      Plant Soybean
      MicroClimate: a_interception=0; b_interception=1; c_interception=0; d_interception=0; SoilHeatFluxFraction=0.4; MinimumHeightDiffForNewLayer=0; NightInterceptionFraction=0.5; ReferenceHeight=2
      Manager SowingFertiliser: same as CR16.paddock.SowingFertiliser
      Manager Harvesting: same as CR16.paddock.Harvesting
      Manager Sow on a fixed date
        Crop = [Soybean]
        SowDate = 14-nov
        CultivarName = Generic_MG6
        SowingDepth = 50
        RowSpacing = 500
        Population = 16
        script: same as in CR16.paddock.Sow on a fixed date
  Simulation PI14f
    Clock: Start=2013-04-01; End=2014-05-15
    Summary summaryfile
    Weather: FileName=piracicaba_2014.xlsx; ExcelWorkSheetName=Irri17
    SoilArbitrator Soil Arbitrator
    Zone P17: Area=2; Slope=0; AspectAngle=0; Altitude=522
      Report HarvestReport: EventNames=[Soybean].Harvesting
        VariableNames:
          [Clock].Today
          [Soybean].AboveGround.Wt*10 as Biomass
          [Soybean].Grain.Total.Wt*10 as Yield
          [Soybean].Phenology.FloweringDAS
          [Soybean].Phenology.MaturityDAS
      Report DailyReport: EventNames=[Clock].DoReport
        VariableNames:
          [Clock].Today
          [Soybean].Phenology.Stage
          [Soybean].Phenology.CurrentStageName as Phase
          [Soybean].AboveGround.Wt*10 as Biomass
          [Soybean].LAI
          [Soybean].Grain.Total.Wt*10 as Yield
          [Soybean].DaysAfterSowing as DAS
      Fertiliser
      Soil: ASCOrder=Oxisol; ASCSubOrder=Black; SoilType=Clay; Site=Piracicaba; State=Sao Paulo; Country=Brazil; ApsoilNumber=900; Latitude=-22.72; Longitude=-47.63
        Physical: same as PI14b.P13.Soil.Physical
        Organic: same as CR17.paddock.Soil.Organic
        WaterBalance SoilWater: same as CR16.paddock.Soil.SoilWater
        Chemical: Thickness=[150, 150, 200]; PH=[5.35, 5.35, 5.35]; PHUnits=Water
        Water: Thickness=[100, 100, 100, 200, 300, 400, 300]; InitialValues=[0.335, 0.335, 0.336, 0.334, 0.334, 0.334, 0.334]; InitialPAWmm=177.4; RelativeTo=Soybean; FilledFromTop=false
        CERESSoilTemperature Temperature
        Nutrient
        Solute NO3: Thickness=[150, 150, 200]; InitialValues=[1, 1, 1]; InitialValuesUnits=ppm; WaterTableConcentration=0; D0=0; DepthConstant=0; MaxDepthSoluteAccessible=0; RunoffEffectivenessAtMovingSolute=0; MaxEffectiveRunoff=0
        Solute NH4: Thickness=[150, 150, 200]; InitialValues=[0.1, 0.1, 0.1]; InitialValuesUnits=ppm; WaterTableConcentration=0; D0=0; DepthConstant=0; MaxDepthSoluteAccessible=0; RunoffEffectivenessAtMovingSolute=0; MaxEffectiveRunoff=0
        Solute Urea: Thickness=[150, 150, 200]; InitialValues=[0, 0, 0]; InitialValuesUnits=kg/ha; WaterTableConcentration=0; D0=0; DepthConstant=0; MaxDepthSoluteAccessible=0; RunoffEffectivenessAtMovingSolute=0; MaxEffectiveRunoff=0
      SurfaceOrganicMatter: InitialResidueName=wheat; InitialResidueType=wheat; InitialResidueMass=100; InitialStandingFraction=0; InitialCPR=0; InitialCNR=55
      Plant Soybean
      MicroClimate: a_interception=0; b_interception=1; c_interception=0; d_interception=0; SoilHeatFluxFraction=0.4; MinimumHeightDiffForNewLayer=0; NightInterceptionFraction=0.5; ReferenceHeight=2
      Manager SowingFertiliser: same as CR16.paddock.SowingFertiliser
      Manager Harvesting: same as CR16.paddock.Harvesting
      Manager Sow on a fixed date
        Crop = [Soybean]
        SowDate = 8-jan
        CultivarName = Generic_MG6
        SowingDepth = 50
        RowSpacing = 500
        Population = 36
        script: same as in CR16.paddock.Sow on a fixed date
  Simulation LO14a
    Clock: Start=2013-10-01; End=2014-05-15
    Summary summaryfile
    Weather: FileName=londrina_2014.xlsx; ExcelWorkSheetName=londrina
    SoilArbitrator Soil Arbitrator
    Zone P6: Area=2; Slope=0; AspectAngle=0; Altitude=522
      Report HarvestReport: EventNames=[Soybean].Harvesting
        VariableNames:
          [Clock].Today
          [Soybean].AboveGround.Wt*10 as Biomass
          [Soybean].Grain.Total.Wt*10 as Yield
          [Soybean].Phenology.FloweringDAS
          [Soybean].Phenology.MaturityDAS
      Report DailyReport: EventNames=[Clock].DoReport
        VariableNames:
          [Clock].Today
          [Soybean].Phenology.Stage
          [Soybean].Phenology.CurrentStageName as Phase
          [Soybean].AboveGround.Wt*10 as Biomass
          [Soybean].LAI
          [Soybean].Grain.Total.Wt*10 as Yield
          [Soybean].DaysAfterSowing as DAS
      Fertiliser
      Soil: ASCOrder=Alfisol; ASCSubOrder=Black; SoilType=Clay; Site=Londrina; State=Parana; Country=Brazil; Latitude=-23.3; Longitude=-51.15
        Physical
          Thickness  ParticleSizeClay  ParticleSizeSand  ParticleSizeSilt  Rocks  BD     AirDry  LL15  DUL   SAT   KS
          100        51                31                13                0      1.281  0.15    0.3   0.42  0.44  20
          100        51                31                13                0      1.394  0.16    0.32  0.45  0.46  20
          100        51                31                13                0      1.371  0.16    0.32  0.47  0.48  20
          200        51                31                13                0      1.371  0.28    0.32  0.47  0.48  20
          300        51                31                13                0      1.371  0.28    0.32  0.47  0.48  20
          400        51                31                13                0      1.371  0.28    0.32  0.47  0.48  20
          300        51                31                13                0      1.371  0.28    0.32  0.47  0.48  20
          Rocks source: Calculated
          SoilCrop SoybeanSoil: LL=[0.3, 0.32, 0.32, 0.32, 0.32, 0.32, 0.32]; KL=[0.1, 0.1, 0.06, 0.02, 0.02, 0.01, 0.01]; XF=[1, 1, 1, 1, 1, 1, 1]
        WaterBalance SoilWater: SummerDate=1-Nov; SummerU=5; SummerCona=5; WinterDate=1-Apr; WinterU=5; WinterCona=5; DiffusConst=40; DiffusSlope=16; Salb=0.12; CN2Bare=73; CNRed=20; CNCov=0.8; PSIDul=-100; Thickness=[150, 150, 300, 300, 300, 300, 300]; SWCON=[0.3, 0.3, 0.3, 0.3, 0.3, 0.3, 0.3]
        Organic: same as CR17.paddock.Soil.Organic
        Chemical: Thickness=[100, 100, 100]; PH=[5.6, 5.6, 5.6]; PHUnits=Water
        Water: Thickness=[100, 100, 100, 200, 300, 400, 300]; InitialValues=[0.372, 0.398, 0.41, 0.41, 0.41, 0.41, 0.41]; InitialPAWmm=132; RelativeTo=Soybean; FilledFromTop=false
        CERESSoilTemperature Temperature
        Nutrient
        Solute NO3: Thickness=[100, 100, 100]; InitialValues=[1, 1, 1]; InitialValuesUnits=ppm; WaterTableConcentration=0; D0=0; DepthConstant=0; MaxDepthSoluteAccessible=0; RunoffEffectivenessAtMovingSolute=0; MaxEffectiveRunoff=0
        Solute NH4: Thickness=[100, 100, 100]; InitialValues=[0.1, 0.1, 0.1]; InitialValuesUnits=ppm; WaterTableConcentration=0; D0=0; DepthConstant=0; MaxDepthSoluteAccessible=0; RunoffEffectivenessAtMovingSolute=0; MaxEffectiveRunoff=0
        Solute Urea: Thickness=[100, 100, 100]; InitialValues=[0, 0, 0]; InitialValuesUnits=kg/ha; WaterTableConcentration=0; D0=0; DepthConstant=0; MaxDepthSoluteAccessible=0; RunoffEffectivenessAtMovingSolute=0; MaxEffectiveRunoff=0
      SurfaceOrganicMatter: InitialResidueName=wheat; InitialResidueType=wheat; InitialResidueMass=100; InitialStandingFraction=0; InitialCPR=0; InitialCNR=55
      Plant Soybean
      MicroClimate: a_interception=0; b_interception=1; c_interception=0; d_interception=0; SoilHeatFluxFraction=0.4; MinimumHeightDiffForNewLayer=0; NightInterceptionFraction=0.5; ReferenceHeight=2
      Manager SowingFertiliser: same as CR16.paddock.SowingFertiliser
      Manager Harvesting: same as CR16.paddock.Harvesting
      Manager Sow on a fixed date
        Crop = [Soybean]
        SowDate = 10-oct
        CultivarName = Generic_MG6
        SowingDepth = 50
        RowSpacing = 450
        Population = 37
        script: same as in CR16.paddock.Sow on a fixed date
  Simulation LO14b
    Clock: Start=2013-10-01; End=2014-05-15
    Summary summaryfile
    Weather: FileName=londrina_2014.xlsx; ExcelWorkSheetName=Irri7
    SoilArbitrator Soil Arbitrator
    Zone P7: same as LO14a.P6
  Simulation LO14c
    Clock: Start=2013-10-01; End=2014-05-15
    Summary summaryfile
    Weather: FileName=londrina_2014.xlsx; ExcelWorkSheetName=londrina
    SoilArbitrator Soil Arbitrator
    Zone P8: Area=2; Slope=0; AspectAngle=0; Altitude=522
      Report HarvestReport: EventNames=[Soybean].Harvesting
        VariableNames:
          [Clock].Today
          [Soybean].AboveGround.Wt*10 as Biomass
          [Soybean].Grain.Total.Wt*10 as Yield
          [Soybean].Phenology.FloweringDAS
          [Soybean].Phenology.MaturityDAS
      Report DailyReport: EventNames=[Clock].DoReport
        VariableNames:
          [Clock].Today
          [Soybean].Phenology.Stage
          [Soybean].Phenology.CurrentStageName as Phase
          [Soybean].AboveGround.Wt*10 as Biomass
          [Soybean].LAI
          [Soybean].Grain.Total.Wt*10 as Yield
          [Soybean].DaysAfterSowing as DAS
      Fertiliser
      Soil: same as LO14a.P6.Soil
      SurfaceOrganicMatter: InitialResidueName=wheat; InitialResidueType=wheat; InitialResidueMass=100; InitialStandingFraction=0; InitialCPR=0; InitialCNR=55
      Plant Soybean
      MicroClimate: a_interception=0; b_interception=1; c_interception=0; d_interception=0; SoilHeatFluxFraction=0.4; MinimumHeightDiffForNewLayer=0; NightInterceptionFraction=0.5; ReferenceHeight=2
      Manager SowingFertiliser: same as CR16.paddock.SowingFertiliser
      Manager Harvesting: same as CR16.paddock.Harvesting
      Manager Sow on a fixed date
        Crop = [Soybean]
        SowDate = 31-oct
        CultivarName = Generic_MG6
        SowingDepth = 50
        RowSpacing = 450
        Population = 27
        script: same as in CR16.paddock.Sow on a fixed date
  Simulation LO14d
    Clock: Start=2013-10-01; End=2014-05-15
    Summary summaryfile
    Weather: FileName=londrina_2014.xlsx; ExcelWorkSheetName=Irri9
    SoilArbitrator Soil Arbitrator
    Zone P9: Area=2; Slope=0; AspectAngle=0; Altitude=522
      Report HarvestReport: EventNames=[Soybean].Harvesting
        VariableNames:
          [Clock].Today
          [Soybean].AboveGround.Wt*10 as Biomass
          [Soybean].Grain.Total.Wt*10 as Yield
          [Soybean].Phenology.FloweringDAS
          [Soybean].Phenology.MaturityDAS
      Report DailyReport: EventNames=[Clock].DoReport
        VariableNames:
          [Clock].Today
          [Soybean].Phenology.Stage
          [Soybean].Phenology.CurrentStageName as Phase
          [Soybean].AboveGround.Wt*10 as Biomass
          [Soybean].LAI
          [Soybean].Grain.Total.Wt*10 as Yield
          [Soybean].DaysAfterSowing as DAS
      Fertiliser
      Soil: same as LO14a.P6.Soil
      SurfaceOrganicMatter: InitialResidueName=wheat; InitialResidueType=wheat; InitialResidueMass=100; InitialStandingFraction=0; InitialCPR=0; InitialCNR=55
      Plant Soybean
      MicroClimate: a_interception=0; b_interception=1; c_interception=0; d_interception=0; SoilHeatFluxFraction=0.4; MinimumHeightDiffForNewLayer=0; NightInterceptionFraction=0.5; ReferenceHeight=2
      Manager SowingFertiliser: same as CR16.paddock.SowingFertiliser
      Manager Harvesting: same as CR16.paddock.Harvesting
      Manager Sow on a fixed date
        Crop = [Soybean]
        SowDate = 31-oct
        CultivarName = Generic_MG6
        SowingDepth = 50
        RowSpacing = 450
        Population = 37
        script: same as in CR16.paddock.Sow on a fixed date
  Simulation LO14e
    Clock: Start=2013-10-01; End=2014-05-15
    Summary summaryfile
    Weather: FileName=londrina_2014.xlsx; ExcelWorkSheetName=londrina
    SoilArbitrator Soil Arbitrator
    Zone P10: Area=2; Slope=0; AspectAngle=0; Altitude=522
      Report HarvestReport: EventNames=[Soybean].Harvesting
        VariableNames:
          [Clock].Today
          [Soybean].AboveGround.Wt*10 as Biomass
          [Soybean].Grain.Total.Wt*10 as Yield
          [Soybean].Phenology.FloweringDAS
          [Soybean].Phenology.MaturityDAS
      Report DailyReport: EventNames=[Clock].DoReport
        VariableNames:
          [Clock].Today
          [Soybean].Phenology.Stage
          [Soybean].Phenology.CurrentStageName as Phase
          [Soybean].AboveGround.Wt*10 as Biomass
          [Soybean].LAI
          [Soybean].Grain.Total.Wt*10 as Yield
          [Soybean].DaysAfterSowing as DAS
      Fertiliser
      Soil: same as LO14a.P6.Soil
      SurfaceOrganicMatter: InitialResidueName=wheat; InitialResidueType=wheat; InitialResidueMass=100; InitialStandingFraction=0; InitialCPR=0; InitialCNR=55
      Plant Soybean
      MicroClimate: a_interception=0; b_interception=1; c_interception=0; d_interception=0; SoilHeatFluxFraction=0.4; MinimumHeightDiffForNewLayer=0; NightInterceptionFraction=0.5; ReferenceHeight=2
      Manager SowingFertiliser: same as CR16.paddock.SowingFertiliser
      Manager Harvesting: same as CR16.paddock.Harvesting
      Manager Sow on a fixed date
        Crop = [Soybean]
        SowDate = 19-nov
        CultivarName = Generic_MG6
        SowingDepth = 50
        RowSpacing = 450
        Population = 27
        script: same as in CR16.paddock.Sow on a fixed date
  Simulation LO14f
    Clock: Start=2013-10-01; End=2014-05-15
    Summary summaryfile
    Weather: FileName=londrina_2014.xlsx; ExcelWorkSheetName=Irri11
    SoilArbitrator Soil Arbitrator
    Zone P11: Area=2; Slope=0; AspectAngle=0; Altitude=522
      Report HarvestReport: EventNames=[Soybean].Harvesting
        VariableNames:
          [Clock].Today
          [Soybean].AboveGround.Wt*10 as Biomass
          [Soybean].Grain.Total.Wt*10 as Yield
          [Soybean].Phenology.FloweringDAS
          [Soybean].Phenology.MaturityDAS
      Report DailyReport: EventNames=[Clock].DoReport
        VariableNames:
          [Clock].Today
          [Soybean].Phenology.Stage
          [Soybean].Phenology.CurrentStageName as Phase
          [Soybean].AboveGround.Wt*10 as Biomass
          [Soybean].LAI
          [Soybean].Grain.Total.Wt*10 as Yield
          [Soybean].DaysAfterSowing as DAS
      Fertiliser
      Soil: same as LO14a.P6.Soil
      SurfaceOrganicMatter: InitialResidueName=wheat; InitialResidueType=wheat; InitialResidueMass=100; InitialStandingFraction=0; InitialCPR=0; InitialCNR=55
      Plant Soybean
      MicroClimate: a_interception=0; b_interception=1; c_interception=0; d_interception=0; SoilHeatFluxFraction=0.4; MinimumHeightDiffForNewLayer=0; NightInterceptionFraction=0.5; ReferenceHeight=2
      Manager SowingFertiliser: same as CR16.paddock.SowingFertiliser
      Manager Harvesting: same as CR16.paddock.Harvesting
      Manager Sow on a fixed date
        Crop = [Soybean]
        SowDate = 19-nov
        CultivarName = Generic_MG6
        SowingDepth = 50
        RowSpacing = 450
        Population = 33
        script: same as in CR16.paddock.Sow on a fixed date
  Simulation CA15
    Clock: Start=2014-07-01; End=2015-06-30
    Summary summaryfile
    Weather: FileName=castro_2013-2016.xlsx; ExcelWorkSheetName=cas-2015
    SoilArbitrator Soil Arbitrator
    Zone P19: Area=2; Slope=0; AspectAngle=0; Altitude=522
      Report HarvestReport: EventNames=[Soybean].Harvesting
        VariableNames:
          [Clock].Today
          [Soybean].AboveGround.Wt*10 as Biomass
          [Soybean].Grain.Total.Wt*10 as Yield
          [Soybean].Phenology.FloweringDAS
          [Soybean].Phenology.MaturityDAS
      Report DailyReport: EventNames=[Clock].DoReport
        VariableNames:
          [Clock].Today
          [Soybean].Phenology.Stage
          [Soybean].Phenology.CurrentStageName as Phase
          [Soybean].AboveGround.Wt*10 as Biomass
          [Soybean].LAI
          [Soybean].Grain.Total.Wt*10 as Yield
          [Soybean].DaysAfterSowing as DAS
      Fertiliser
      Soil: ASCOrder=Oxisol; ASCSubOrder=Black; SoilType=Clay; Site=Piracicaba; State=Sao Paulo; Country=Brazil; ApsoilNumber=900; Latitude=-22.72; Longitude=-47.63
        Physical
          Thickness  ParticleSizeClay  ParticleSizeSand  ParticleSizeSilt  Rocks  BD    AirDry  LL15   DUL    SAT   KS
          100        54                30                16                0      1.49  0.145   0.197  0.303  0.43  20
          100        58                28                14                0      1.49  0.1     0.204  0.311  0.43  20
          100        61                28                11                0      1.49  0.1     0.205  0.311  0.43  20
          200        61                28                11                0      1.49  0.18    0.205  0.311  0.43  20
          300        61                28                11                0      1.49  0.18    0.205  0.311  0.43  20
          400        61                28                11                0      1.49  0.18    0.205  0.311  0.43  20
          300        61                28                11                0      1.49  0.18    0.205  0.311  0.43  20
          Rocks source: Calculated
          SoilCrop SoybeanSoil: LL=[0.197, 0.204, 0.205, 0.205, 0.205, 0.205, 0.205]; KL=[0.1, 0.1, 0.06, 0.02, 0.02, 0.01, 0.01]; XF=[1, 1, 1, 1, 1, 1, 1]
        WaterBalance SoilWater: same as LO14a.P6.Soil.SoilWater
        Organic: same as CR17.paddock.Soil.Organic
        Chemical: Thickness=[150, 150, 200]; PH=[5.4, 5.5, 5.5]; PHUnits=Water
        Water: Thickness=[100, 100, 100, 200, 300, 400, 300]; InitialValues=[0.261, 0.268, 0.269, 0.269, 0.269, 0.269, 0.269]; InitialPAWmm=96; RelativeTo=Soybean; FilledFromTop=false
        CERESSoilTemperature Temperature
        Nutrient
        Solute NO3: Thickness=[150, 150, 200]; InitialValues=[1, 1, 1]; InitialValuesUnits=ppm; WaterTableConcentration=0; D0=0; DepthConstant=0; MaxDepthSoluteAccessible=0; RunoffEffectivenessAtMovingSolute=0; MaxEffectiveRunoff=0
        Solute NH4: Thickness=[150, 150, 200]; InitialValues=[0.1, 0.1, 0.1]; InitialValuesUnits=ppm; WaterTableConcentration=0; D0=0; DepthConstant=0; MaxDepthSoluteAccessible=0; RunoffEffectivenessAtMovingSolute=0; MaxEffectiveRunoff=0
        Solute Urea: Thickness=[150, 150, 200]; InitialValues=[0, 0, 0]; InitialValuesUnits=kg/ha; WaterTableConcentration=0; D0=0; DepthConstant=0; MaxDepthSoluteAccessible=0; RunoffEffectivenessAtMovingSolute=0; MaxEffectiveRunoff=0
      SurfaceOrganicMatter: InitialResidueName=wheat; InitialResidueType=wheat; InitialResidueMass=100; InitialStandingFraction=0; InitialCPR=0; InitialCNR=55
      Plant Soybean
      MicroClimate: a_interception=0; b_interception=1; c_interception=0; d_interception=0; SoilHeatFluxFraction=0.4; MinimumHeightDiffForNewLayer=0; NightInterceptionFraction=0.5; ReferenceHeight=2
      Manager SowingFertiliser: same as CR16.paddock.SowingFertiliser
      Manager Harvesting: same as CR16.paddock.Harvesting
      Manager Sow on a fixed date
        Crop = [Soybean]
        SowDate = 10-nov
        CultivarName = Generic_MG6
        SowingDepth = 50
        RowSpacing = 450
        Population = 37
        script: same as in CR16.paddock.Sow on a fixed date
  Simulation CA16
    Clock: Start=2015-07-01; End=2016-06-29
    Summary summaryfile
    Weather: FileName=castro_2013-2016.xlsx; ExcelWorkSheetName=cas-2016
    SoilArbitrator Soil Arbitrator
    Zone P20: Area=2; Slope=0; AspectAngle=0; Altitude=522
      Report HarvestReport: EventNames=[Soybean].Harvesting
        VariableNames:
          [Clock].Today
          [Soybean].AboveGround.Wt*10 as Biomass
          [Soybean].Grain.Total.Wt*10 as Yield
          [Soybean].Phenology.FloweringDAS
          [Soybean].Phenology.MaturityDAS
      Report DailyReport: EventNames=[Clock].DoReport
        VariableNames:
          [Clock].Today
          [Soybean].Phenology.Stage
          [Soybean].Phenology.CurrentStageName as Phase
          [Soybean].AboveGround.Wt*10 as Biomass
          [Soybean].LAI
          [Soybean].Grain.Total.Wt*10 as Yield
          [Soybean].DaysAfterSowing as DAS
      Fertiliser
      Soil: same as CA15.P19.Soil
      SurfaceOrganicMatter: InitialResidueName=wheat; InitialResidueType=wheat; InitialResidueMass=100; InitialStandingFraction=0; InitialCPR=0; InitialCNR=55
      Plant Soybean
      MicroClimate: a_interception=0; b_interception=1; c_interception=0; d_interception=0; SoilHeatFluxFraction=0.4; MinimumHeightDiffForNewLayer=0; NightInterceptionFraction=0.5; ReferenceHeight=2
      Manager SowingFertiliser: same as CR16.paddock.SowingFertiliser
      Manager Harvesting: same as CR16.paddock.Harvesting
      Manager Sow on a fixed date
        Crop = [Soybean]
        SowDate = 1-nov
        CultivarName = Generic_MG6
        SowingDepth = 50
        RowSpacing = 450
        Population = 29
        script: same as in CR16.paddock.Sow on a fixed date
  Simulation MV16
    Clock: Start=2015-07-01; End=2016-06-29
    Summary summaryfile
    Weather: FileName=montividiu_2013-2016.xlsx; ExcelWorkSheetName=mon-2016
    SoilArbitrator Soil Arbitrator
    Zone P26: Area=2; Slope=0; AspectAngle=0; Altitude=522
      Report HarvestReport: EventNames=[Soybean].Harvesting
        VariableNames:
          [Clock].Today
          [Soybean].AboveGround.Wt*10 as Biomass
          [Soybean].Grain.Total.Wt*10 as Yield
          [Soybean].Phenology.FloweringDAS
          [Soybean].Phenology.MaturityDAS
      Report DailyReport: EventNames=[Clock].DoReport
        VariableNames:
          [Clock].Today
          [Soybean].Phenology.Stage
          [Soybean].Phenology.CurrentStageName as Phase
          [Soybean].AboveGround.Wt*10 as Biomass
          [Soybean].LAI
          [Soybean].Grain.Total.Wt*10 as Yield
          [Soybean].DaysAfterSowing as DAS
      Fertiliser
      Soil: ASCOrder=Oxisol; ASCSubOrder=Black; SoilType=Clay; Site=Piracicaba; State=Sao Paulo; Country=Brazil; ApsoilNumber=900; Latitude=-22.72; Longitude=-47.63
        Physical
          Thickness  ParticleSizeClay  ParticleSizeSand  ParticleSizeSilt  Rocks  BD   AirDry  LL15   DUL    SAT   KS
          100        56                31                13                0      1.2  0.145   0.196  0.3    0.53  20
          100        60                32                8                 0      1.2  0.145   0.196  0.296  0.53  20
          100        67                27                6                 0      1.2  0.105   0.21   0.316  0.54  20
          200        67                27                6                 0      1.2  0.19    0.21   0.316  0.54  20
          300        67                27                6                 0      1.2  0.2     0.21   0.316  0.54  20
          400        67                27                6                 0      1.2  0.2     0.21   0.316  0.54  20
          300        67                27                6                 0      1.2  0.2     0.21   0.316  0.54  20
          Rocks source: Calculated
          SoilCrop SoybeanSoil: LL=[0.196, 0.196, 0.21, 0.21, 0.21, 0.21, 0.21]; KL=[0.1, 0.1, 0.06, 0.02, 0.02, 0.01, 0.01]; XF=[1, 1, 1, 1, 1, 1, 1]
        WaterBalance SoilWater: same as LO14a.P6.Soil.SoilWater
        Organic: same as CR17.paddock.Soil.Organic
        Chemical: Thickness=[150, 150, 200]; PH=[5.4, 5, 4.8]; PHUnits=Water
        Water: Thickness=[100, 100, 100, 200, 300, 400, 300]; InitialValues=[0.258, 0.256, 0.274, 0.274, 0.274, 0.274, 0.274]; InitialPAWmm=95.4; RelativeTo=Soybean; FilledFromTop=false
        CERESSoilTemperature Temperature
        Nutrient
        Solute NO3: Thickness=[150, 150, 200]; InitialValues=[1, 1, 1]; InitialValuesUnits=ppm; WaterTableConcentration=0; D0=0; DepthConstant=0; MaxDepthSoluteAccessible=0; RunoffEffectivenessAtMovingSolute=0; MaxEffectiveRunoff=0
        Solute NH4: Thickness=[150, 150, 200]; InitialValues=[0.1, 0.1, 0.1]; InitialValuesUnits=ppm; WaterTableConcentration=0; D0=0; DepthConstant=0; MaxDepthSoluteAccessible=0; RunoffEffectivenessAtMovingSolute=0; MaxEffectiveRunoff=0
        Solute Urea: Thickness=[150, 150, 200]; InitialValues=[0, 0, 0]; InitialValuesUnits=kg/ha; WaterTableConcentration=0; D0=0; DepthConstant=0; MaxDepthSoluteAccessible=0; RunoffEffectivenessAtMovingSolute=0; MaxEffectiveRunoff=0
      SurfaceOrganicMatter: InitialResidueName=wheat; InitialResidueType=wheat; InitialResidueMass=100; InitialStandingFraction=0; InitialCPR=0; InitialCNR=55
      Plant Soybean
      MicroClimate: a_interception=0; b_interception=1; c_interception=0; d_interception=0; SoilHeatFluxFraction=0.4; MinimumHeightDiffForNewLayer=0; NightInterceptionFraction=0.5; ReferenceHeight=2
      Manager SowingFertiliser: same as CR16.paddock.SowingFertiliser
      Manager Harvesting: same as CR16.paddock.Harvesting
      Manager Sow on a fixed date
        Crop = [Soybean]
        SowDate = 6-nov
        CultivarName = Generic_MG6
        SowingDepth = 50
        RowSpacing = 450
        Population = 44
        script: same as in CR16.paddock.Sow on a fixed date
  Simulation MB14
    Clock: Start=2013-07-01; End=2014-06-30
    Summary summaryfile
    Weather: FileName=mambore_2013-2016.xlsx; ExcelWorkSheetName=mam-2014
    SoilArbitrator Soil Arbitrator
    Zone P21: Area=2; Slope=0; AspectAngle=0; Altitude=522
      Report HarvestReport: EventNames=[Soybean].Harvesting
        VariableNames:
          [Clock].Today
          [Soybean].AboveGround.Wt*10 as Biomass
          [Soybean].Grain.Total.Wt*10 as Yield
          [Soybean].Phenology.FloweringDAS
          [Soybean].Phenology.MaturityDAS
      Report DailyReport: EventNames=[Clock].DoReport
        VariableNames:
          [Clock].Today
          [Soybean].Phenology.Stage
          [Soybean].Phenology.CurrentStageName as Phase
          [Soybean].AboveGround.Wt*10 as Biomass
          [Soybean].LAI
          [Soybean].Grain.Total.Wt*10 as Yield
          [Soybean].DaysAfterSowing as DAS
      Fertiliser
      Soil: ASCOrder=Oxisol; ASCSubOrder=Black; SoilType=Clay; Site=Piracicaba; State=Sao Paulo; Country=Brazil; ApsoilNumber=900; Latitude=-22.72; Longitude=-47.63
        Physical
          Thickness  ParticleSizeClay  ParticleSizeSand  ParticleSizeSilt  Rocks  BD    AirDry  LL15   DUL    SAT   KS
          100        76                10                14                0      1.06  0.125   0.249  0.379  0.6   20
          100        75                11                14                0      1.06  0.125   0.246  0.374  0.6   20
          100        76                10                14                0      1.03  0.125   0.249  0.38   0.61  20
          200        76                10                14                0      1.03  0.2     0.249  0.38   0.61  20
          300        76                10                14                0      1.03  0.24    0.249  0.38   0.61  20
          400        76                10                14                0      1.03  0.24    0.249  0.38   0.61  20
          300        76                10                14                0      1.03  0.24    0.249  0.38   0.61  20
          Rocks source: Calculated
          SoilCrop SoybeanSoil: LL=[0.249, 0.246, 0.249, 0.249, 0.249, 0.249, 0.249]; KL=[0.1, 0.1, 0.06, 0.02, 0.02, 0.01, 0.01]; XF=[1, 1, 1, 1, 1, 1, 1]
        WaterBalance SoilWater: same as LO14a.P6.Soil.SoilWater
        Organic: same as CR17.paddock.Soil.Organic
        Chemical: Thickness=[150, 150, 200]; PH=[5, 4.9, 4.9]; PHUnits=Water
        Water: Thickness=[100, 100, 100, 200, 300, 400, 300]; InitialValues=[0.327, 0.323, 0.328, 0.328, 0.328, 0.328, 0.328]; InitialPAWmm=118.2; RelativeTo=Soybean; FilledFromTop=false
        CERESSoilTemperature Temperature
        Nutrient
        Solute NO3: Thickness=[150, 150, 200]; InitialValues=[1, 1, 1]; InitialValuesUnits=ppm; WaterTableConcentration=0; D0=0; DepthConstant=0; MaxDepthSoluteAccessible=0; RunoffEffectivenessAtMovingSolute=0; MaxEffectiveRunoff=0
        Solute NH4: Thickness=[150, 150, 200]; InitialValues=[0.1, 0.1, 0.1]; InitialValuesUnits=ppm; WaterTableConcentration=0; D0=0; DepthConstant=0; MaxDepthSoluteAccessible=0; RunoffEffectivenessAtMovingSolute=0; MaxEffectiveRunoff=0
        Solute Urea: Thickness=[150, 150, 200]; InitialValues=[0, 0, 0]; InitialValuesUnits=kg/ha; WaterTableConcentration=0; D0=0; DepthConstant=0; MaxDepthSoluteAccessible=0; RunoffEffectivenessAtMovingSolute=0; MaxEffectiveRunoff=0
      SurfaceOrganicMatter: InitialResidueName=wheat; InitialResidueType=wheat; InitialResidueMass=100; InitialStandingFraction=0; InitialCPR=0; InitialCNR=55
      Plant Soybean
      MicroClimate: a_interception=0; b_interception=1; c_interception=0; d_interception=0; SoilHeatFluxFraction=0.4; MinimumHeightDiffForNewLayer=0; NightInterceptionFraction=0.5; ReferenceHeight=2
      Manager SowingFertiliser: same as CR16.paddock.SowingFertiliser
      Manager Harvesting: same as CR16.paddock.Harvesting
      Manager Sow on a fixed date
        Crop = [Soybean]
        SowDate = 10-oct
        CultivarName = Generic_MG6
        SowingDepth = 50
        RowSpacing = 450
        Population = 29
        script: same as in CR16.paddock.Sow on a fixed date
  Simulation MB15
    Clock: Start=2014-07-01; End=2015-06-30
    Summary summaryfile
    Weather: FileName=mambore_2013-2016.xlsx; ExcelWorkSheetName=mam-2015
    SoilArbitrator Soil Arbitrator
    Zone P22: Area=2; Slope=0; AspectAngle=0; Altitude=522
      Report HarvestReport: EventNames=[Soybean].Harvesting
        VariableNames:
          [Clock].Today
          [Soybean].AboveGround.Wt*10 as Biomass
          [Soybean].Grain.Total.Wt*10 as Yield
          [Soybean].Phenology.FloweringDAS
          [Soybean].Phenology.MaturityDAS
      Report DailyReport: EventNames=[Clock].DoReport
        VariableNames:
          [Clock].Today
          [Soybean].Phenology.Stage
          [Soybean].Phenology.CurrentStageName as Phase
          [Soybean].AboveGround.Wt*10 as Biomass
          [Soybean].LAI
          [Soybean].Grain.Total.Wt*10 as Yield
          [Soybean].DaysAfterSowing as DAS
      Fertiliser
      Soil: same as MB14.P21.Soil
      SurfaceOrganicMatter: InitialResidueName=wheat; InitialResidueType=wheat; InitialResidueMass=100; InitialStandingFraction=0; InitialCPR=0; InitialCNR=55
      Plant Soybean
      MicroClimate: a_interception=0; b_interception=1; c_interception=0; d_interception=0; SoilHeatFluxFraction=0.4; MinimumHeightDiffForNewLayer=0; NightInterceptionFraction=0.5; ReferenceHeight=2
      Manager SowingFertiliser: same as CR16.paddock.SowingFertiliser
      Manager Harvesting: same as CR16.paddock.Harvesting
      Manager Sow on a fixed date
        Crop = [Soybean]
        SowDate = 3-oct
        CultivarName = Generic_MG6
        SowingDepth = 50
        RowSpacing = 450
        Population = 28
        script: same as in CR16.paddock.Sow on a fixed date
  Simulation MB16
    Clock: Start=2015-07-01; End=2016-06-29
    Summary summaryfile
    Weather: FileName=mambore_2013-2016.xlsx; ExcelWorkSheetName=mam-2016
    SoilArbitrator Soil Arbitrator
    Zone P23: Area=2; Slope=0; AspectAngle=0; Altitude=522
      Report HarvestReport: EventNames=[Soybean].Harvesting
        VariableNames:
          [Clock].Today
          [Soybean].AboveGround.Wt*10 as Biomass
          [Soybean].Grain.Total.Wt*10 as Yield
          [Soybean].Phenology.FloweringDAS
          [Soybean].Phenology.MaturityDAS
      Report DailyReport: EventNames=[Clock].DoReport
        VariableNames:
          [Clock].Today
          [Soybean].Phenology.Stage
          [Soybean].Phenology.CurrentStageName as Phase
          [Soybean].AboveGround.Wt*10 as Biomass
          [Soybean].LAI
          [Soybean].Grain.Total.Wt*10 as Yield
          [Soybean].DaysAfterSowing as DAS
      Fertiliser
      Soil: same as MB14.P21.Soil
      SurfaceOrganicMatter: InitialResidueName=wheat; InitialResidueType=wheat; InitialResidueMass=100; InitialStandingFraction=0; InitialCPR=0; InitialCNR=55
      Plant Soybean
      MicroClimate: a_interception=0; b_interception=1; c_interception=0; d_interception=0; SoilHeatFluxFraction=0.4; MinimumHeightDiffForNewLayer=0; NightInterceptionFraction=0.5; ReferenceHeight=2
      Manager SowingFertiliser: same as CR16.paddock.SowingFertiliser
      Manager Harvesting: same as CR16.paddock.Harvesting
      Manager Sow on a fixed date
        Crop = [Soybean]
        SowDate = 23-sep
        CultivarName = Generic_MG6
        SowingDepth = 50
        RowSpacing = 450
        Population = 28
        script: same as in CR16.paddock.Sow on a fixed date
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